<?xml version="1.0"?>
<?xml-stylesheet type="text/xsl" href="http://jsbsim.sourceforge.net/JSBSim.xsl"?>

<fdm_config name="ProMecc-Freccia" version="2.0" release="ALPHA"
   xmlns:xsi="http://www.w3.org/2001/XMLSchema-instance"
   xsi:noNamespaceSchemaLocation="http://jsbsim.sourceforge.net/JSBSim.xsd">

 <fileheader>
  <author> Aeromatic v 3.3.15 </author>
  <filecreationdate> 24 Sep 2021 </filecreationdate>
  <version>$Revision: 1.80.0 $</version>
  <description>
	Models a ProMecc-Freccia.
    *	Start Point.
  </description>

  <author> Salvatore De Astis </author>
  <filecreationdate> 28 Sep 2021 </filecreationdate>
  <version>$Revision: 1.90.0 $</version>
  <description>
	Models a ProMecc-Freccia.
    *	Datcom+	stability deriatives integrated.
	*	Tuning of : Metrics, Mass Balance, Point Masses,
		Ground Reaction, Flight Comtrols
  </description>

  <author> Salvatore De Astis </author>
  <filecreationdate> 2 Oct 2021 </filecreationdate>
  <version>$Revision: 1.91.0 $</version>
  <description>
	Models a ProMecc-Freccia.
    *	Datcom+	Pro integration.
	*	Fixed Engine and Propeller positions
  </description>
 </fileheader>

<!--
  File:     ProMecc-Freccia.xml
  Inputs:
    name:          ProMecc-Freccia
    type:          Single engine WWII Fighter, Military Trainer, Aerobatic, Air Racer
    stall speed:   41.04kts
    max weight:    1041.86 lb
    length:        23.78 ft
    wing:
     span:         28.80 ft
     area:         109.04 sq-ft
     mean chord:   5.13 ft
     aspect ratio: 7.54:1
     taper ratio:  1.57:1
     incidence:    0.00 degrees
     dihedral:     5.00 degrees
     sweep:        1.00 degrees

    no. engines:   1
    engine type:   Piston Engine
    engine layout: forward fuselage

    gear type:     tricycle
    steering type: steering
    retractable?:  no

  Outputs:
    wing loading:       9.56 lb/sq-ft
     - thickness ratio: 8.02%
    payload:            264.28 lbs
    CL-alpha:           5.33 per radian
    CL-0:               0.37
    CL-max:             1.68
    CD-0:               0.02
    K:                  0.06
    Mcrit:              0.75

    min. turn radius    82.31 ft
    max. turn rate:     0.93 deg/s
-->

<!-- **********************************************************************
        METRICS and CONSTANTS
     *******************************************************************-->
	<metrics>
		<wingarea  unit="FT2">    109.0380  </wingarea>
		<wingspan  unit="FT" >     28.7960  </wingspan>
		<chord     unit="FT" >      3.9660  </chord>
		<htailarea unit="FT2">     23.9948  </htailarea>
		<htailarm  unit="FT" >     12.6944  </htailarm>
		<vtailarea unit="FT2">     13.6749  </vtailarea>
		<vtailarm  unit="FT" >     12.2571  </vtailarm>
		<location name="AERORP" unit="FT">
			<x>     7.9770  </x>
			<y>      .0000  </y>
			<z>      .2715  </z>
		</location>

 		<!-- These values are not needed in JSBSim but are used in FlightGear. -->
		<location name="EYEPOINT" unit="FT">
			<x>  102.576 </x>
			<y>  -11.130 </y>
			<z>   17.208 </z>
		</location>
		<location name="VRP" unit="FT">
			<x>     .0000 </x>
			<y>     .0000 </y>
			<z>     .0000 </z>
		</location>

		<property value="57.2958279  "> RADIANS-TO-DEGREES </property>
		<property value="0.0174532778"> DEGREES-TO-RADIANS </property>
		<property value="0.5924838   "> FPS-TO-KNOTS       </property>
		<property value="60.0"> FPS-TO-FPM </property>

	</metrics>

<!-- **********************************************************************
        MASS_BALANCE
     *******************************************************************-->
	<mass_balance>
      <!-- Estimated by Roskam equations for ACTYPE= 1
           Light Single -->
		<ixx unit="SLUG*FT2">    305.2337  </ixx>
		<iyy unit="SLUG*FT2">    290.9247  </iyy>
		<izz unit="SLUG*FT2">    554.0441  </izz>
		<ixz unit="SLUG*FT2">     17.3561  </ixz>
		<emptywt unit="LBS">    650.3640  </emptywt>
		<location name="CG" unit="FT">
		      <x>         7.87  </x>
		      <y>          .00  </y>
		      <z>         -.83  </z>
		</location>
		<pointmass name="PILOT">
			<weight unit="LBS"> 176.0 </weight>
			<location name="POINTMASS" unit="IN">
			 <x>  82.07  </x>
			 <y> -10.00 </y>
			 <z> -13.00 </z>
			</location>
		</pointmass>
		<pointmass name="CO-PILOT">
			<weight unit="LBS"> 0.0 </weight>
			<location name="POINTMASS" unit="IN">
			 <x>  82.07  </x>
			 <y>  10.00 </y>
			 <z> -13.00 </z>
			</location>
		</pointmass>
		<pointmass name="LUGGAGE">
			<weight unit="LBS"> 0.0 </weight>
			<location name="POINTMASS" unit="IN">
			 <x> 119.685 </x>
			 <y>   0.000 </y>
			 <z>   0.000 </z>
			</location>
		</pointmass>
	</mass_balance>

<!-- **********************************************************************
        UNDERCARRIAGE
     *******************************************************************-->
	<ground_reactions>
		<!-- DATCOM does not calculate ground reactions parameters. -->
		<contact type="BOGEY" name="NOSE">
			<location unit="IN">
			 <x>  36.614 </x>
			 <y>   0.000 </y>
			 <z> -35.078 </z>
			</location>
			<static_friction>  0.80 </static_friction>
			<dynamic_friction> 0.50 </dynamic_friction>
			<rolling_friction> 0.02 </rolling_friction>
			<spring_coeff unit="LBS/FT">     3000 </spring_coeff>
			<damping_coeff unit="LBS/FT/SEC"> 100 </damping_coeff>
			<max_steer unit="DEG"> 10.00 </max_steer>
			<brake_group>NONE</brake_group>
			<retractable>0</retractable>
		</contact>

		<contact type="BOGEY" name="LEFT_MAIN">
			<location unit="IN">
			 <x>  95.354 </x>
			 <y> -31.496 </y>
			 <z> -35.078 </z>
			</location>
			<static_friction>  0.80 </static_friction>
			<dynamic_friction> 0.50 </dynamic_friction>
			<rolling_friction> 0.02 </rolling_friction>
			<spring_coeff unit="LBS/FT">       2000 </spring_coeff>
			<damping_coeff unit="LBS/FT/SEC">   50 </damping_coeff>
			<max_steer unit="DEG">0</max_steer>
			<brake_group>LEFT</brake_group>
			<retractable>0</retractable>
		</contact>

		<contact type="BOGEY" name="RIGHT_MAIN">
			<location unit="IN">
			 <x>  95.354 </x>
			 <y>  31.496 </y>
			 <z> -35.078 </z>
			</location>
			<static_friction>  0.80 </static_friction>
			<dynamic_friction> 0.50 </dynamic_friction>
			<rolling_friction> 0.02 </rolling_friction>
			<spring_coeff unit="LBS/FT">       2000 </spring_coeff>
			<damping_coeff unit="LBS/FT/SEC">   50 </damping_coeff>
			<max_steer unit="DEG">0</max_steer>
			<brake_group>RIGHT</brake_group>
			<retractable>0</retractable>
		</contact>

		<contact type="STRUCTURE" name="LEFT_WING_TIP">
			<location unit="IN">
			 <x>  95.275 </x>
			 <y>-172.480 </y>
			 <z>   0.000 </z>
			</location>
			<static_friction>  1.00 </static_friction>
			<dynamic_friction> 1.00 </dynamic_friction>
			<spring_coeff unit="LBS/FT">        1041.86 </spring_coeff>
			<damping_coeff unit="LBS/FT/SEC">   1041.86 </damping_coeff>
		</contact>

		<contact type="STRUCTURE" name="RIGHT_WING_TIP">
			<location unit="IN">
			 <x>  95.275 </x>
			 <y> 172.480 </y>
			 <z>   0.000 </z>
			</location>
			<static_friction>  1.00 </static_friction>
			<dynamic_friction> 1.00 </dynamic_friction>
			<spring_coeff unit="LBS/FT">       1041.86 </spring_coeff>
			<damping_coeff unit="LBS/FT/SEC">  1041.86 </damping_coeff>
		</contact>

		<contact type="STRUCTURE" name="TAIL_SKID">
			<location unit="IN">
			 <x> 231.889 </x>
			 <y>   0.000 </y>
			 <z>  12.834 </z>
			</location>
			<static_friction> 0.5 </static_friction>
			<dynamic_friction> 0.25 </dynamic_friction>
			<spring_coeff unit="LBS/FT">       2000 </spring_coeff>
			<damping_coeff unit="LBS/FT/SEC">  1000 </damping_coeff>
			</contact>
	</ground_reactions>

 <system file="Landing Gear.xml"/>

 <propulsion>

   <engine file="ROTAX912ULS">
    <location unit="FT">
      <x>     1.825 </x>
      <y>     0.00 </y>
      <z>     0.00 </z>
    </location>
    <orient unit="DEG">
      <pitch>     0.00 </pitch>
       <roll>     0.00 </roll>
        <yaw>     0.00 </yaw>
    </orient>
    <feed> 0 </feed>
    <feed> 1 </feed>

    <thruster file="DUCHELICES-SWIRL3">
     <sense> 1 </sense>
     <location unit="IN">
       <x>     0.00 </x>
       <y>     0.00 </y>
       <z>     0.00 </z>
     </location>
     <orient unit="DEG">
       <pitch>     0.00 </pitch>
        <roll>     0.00 </roll>
         <yaw>     0.00 </yaw>
     </orient>
    </thruster>
  </engine>

  <tank type="FUEL" number="0">
     <location unit="IN">
       <x>  90.551 </x>
       <y> -22.677 </y>
       <z> -12.000 </z>
     </location>
     <capacity unit="LBS">  87.47 </capacity>  <!-- 55l of fuel -->
     <contents unit="LBS">  36.71 </contents>
	 <type>AVGAS</type>
  </tank>

  <tank type="FUEL" number="1">
     <location unit="IN">
       <x>  90.551 </x>
       <y>  22.677 </y>
       <z> -12.000 </z>
     </location>
     <capacity unit="LBS">  87.47 </capacity> <!-- 55l of fuel -->
     <contents unit="LBS">  36.71 </contents>
	 <type>AVGAS</type>
  </tank>

 		<!--    THRUST COEFFICIENT
			Datcom uses a different formula than JSBSim does to calculate thrust coefficent.
			Datcom uses:
				Tc = Total Thrust / ( q * s)
			contained in property: propulsion/total-thrust-coefficient

			whereas JSBSim calculates per-engine thrust coefficient
				Tc = Thrust / ( RPS^2 * D^4 * rho )
			contained in property: propulsion/engine[x]/thrust-coefficient
		-->
		<function name="propulsion/total-thrust-coefficient">
			<description> Total thrust coefficient calculation </description>
			<quotient>
				<property>propulsion/engine/thrust-lbs</property>
				<property>aero/qbar-area</property>
			</quotient>
		</function>

 </propulsion>


<!-- **********************************************************************
        AUTOPILOT
     *******************************************************************-->
   <!-- This is provided so that you can write an autopilot
        model for your aircraft, based on a generic autopilot      -->

    <autopilot file="Systems/autopilot.xml"/>

<!-- **********************************************************************
        FLIGHT CONTROLS
     *******************************************************************-->
	<flight_control name="FCS: ProMecc-Freccia">

		<channel name="Pitch">
			<summer name="fcs/pitch-control-sum">
				<input> fcs/elevator-cmd-norm </input>
				<input> fcs/pitch-trim-cmd-norm </input>
				<input> ap/longitudinal-cmd </input>
				<clipto>
					<min> -1.0 </min>
					<max>  1.0 </max>
				</clipto>
			</summer>

			<aerosurface_scale name="Elevator-Position-in-deg">
				<input> fcs/pitch-control-sum </input>
				<zero_centered> true </zero_centered>
				<domain>
					<min> -1.0 </min>
					<max>  1.0 </max>
				</domain>
				<range>
					<min>-20.00</min>
					<max> 15.00</max>
				</range>
				<output> fcs/elevator-pos-deg </output>
			</aerosurface_scale>
		</channel>


		<channel name="Roll">
			<summer name="fcs/roll-control-sum">
				<input> fcs/aileron-cmd-norm </input>
				<input> fcs/roll-trim-cmd-norm </input>
				<input> ap/lateral-cmd </input>
				<clipto>
					<min> -1.0 </min>
					<max>  1.0 </max>
				</clipto>
			</summer>
			<aerosurface_scale name="Left-aileron-Position-in-deg">
				<input> fcs/roll-control-sum </input>
				<zero_centered> true </zero_centered>
				<domain>
					<min> -1.0 </min>
					<max>  1.0 </max>
				</domain>
				<range>
					<min> -12.00</min>
					<max>  24.00</max>
				</range>
				<output> fcs/left-aileron-pos-deg </output>
			</aerosurface_scale>

			<aerosurface_scale name="Right-aileron-Position-in-deg">
				<input> -fcs/roll-control-sum </input>
				<zero_centered> true </zero_centered>
				<domain>
					<min> -1.0 </min>
					<max>  1.0 </max>
				</domain>
				<range>
					<min>-12.00</min>
					<max> 24.00</max>
				</range>
				<output> fcs/right-aileron-pos-deg </output>
			</aerosurface_scale>

			<summer name="fcs/total-aileron-pos-deg">
				<description> Total control deflection (Left-Right)</description>
				<input>  fcs/left-aileron-pos-deg </input>
				<input> -fcs/right-aileron-pos-deg </input>
			</summer>

		</channel>


		<channel name="Yaw">

			<!-- Datcom doesn't calculate rudder parameters, but this is included for completeness -->
			<summer name="fcs/yaw-control-sum">
				<input> fcs/rudder-cmd-norm </input>
				<input> fcs/yaw-trim-cmd-norm </input>
				<input> ap/directional-cmd </input>
				<clipto>
				<min> -1.0 </min>
				<max>  1.0 </max>
				</clipto>
			</summer>

			<aerosurface_scale name="fcs/rudder">
				<input> fcs/yaw-control-sum </input>
				<zero_centered> true </zero_centered>
				<domain>
				<min> -1.0 </min>
				<max>  1.0 </max>
				</domain>
				<range>
				<min> -25.0 </min>
				<max>  25.0 </max>
				</range>
				<output> fcs/rudder-pos-deg </output>
			</aerosurface_scale>

		</channel>


		<channel name="Flaps">
			<kinematic name="flap-control">
				<input> fcs/flap-cmd-norm </input>
				<traverse>
					<setting>
						<position>  .000 </position>			<!--    .00 deg -->
						<time>       .00 </time>
					</setting>
					<setting>
						<position>  .143 </position>			<!--   5.00 deg -->
						<time>      1.00 </time>
					</setting>
					<setting>
						<position>  .286 </position>			<!--  10.00 deg -->
						<time>      2.00 </time>
					</setting>
					<setting>
						<position>  .429 </position>			<!--  15.00 deg -->
						<time>      3.00 </time>
					</setting>
					<setting>
						<position>  .571 </position>			<!--  20.00 deg -->
						<time>      4.00 </time>
					</setting>
					<setting>
						<position>  .714 </position>			<!--  25.00 deg -->
						<time>      5.00 </time>
					</setting>
					<setting>
						<position>  .857 </position>			<!--  30.00 deg -->
						<time>     6.00 </time>
					</setting>
					<setting>
						<position> 1.000 </position>			<!--  35.00 deg -->
						<time>    7.00 </time>
					</setting>
				</traverse>
				<output> fcs/flap-pos-norm </output>
			</kinematic>

			<aerosurface_scale name="fcs/flap-position">
				<input> fcs/flap-pos-norm </input>
					<zero_centered> false </zero_centered>
					<domain>
						<min>  0.0 </min>
						<max>  1.0 </max>
					</domain>
					<range>
						<min>   .00 </min>
						<max> 35.00 </max>
					</range>
					<output> fcs/flap-pos-deg </output>
			</aerosurface_scale>

		</channel>


		<channel name="Landing Gear">
			<kinematic name="gear-control">
				<input>gear/gear-cmd-norm</input>
				<traverse>
					<setting>
						<position> 0 </position>
						<time>     0 </time>
					</setting>
					<setting>
						<position> 1 </position>
						<time>     5 </time>
					</setting>
				</traverse>
				<output>gear/gear-pos-norm</output>
			</kinematic>
		</channel>

        <channel name="Braking">
            <summer name="fcs/parking-brake-sum">
                <!--input>/sim/model/ProMeccFreccia/securing/chock-visible</input-->
                <!--input>/fdm/jsbsim/damage/repairing</input-->
                <input>/controls/gear/brake-parking</input>
            </summer>

            <fcs_function name="fcs/left-brake-sum">
                <function>
                    <max>
                        <property>fcs/parking-brake-sum</property>
                        <property>/controls/gear/brake-left</property>
						<property>/controls/gear/brake-right</property>
                    </max>
                </function>
                <output>fcs/left-brake-cmd-norm</output>
            </fcs_function>

            <fcs_function name="fcs/right-brake-sum">
                <function>
                    <max>
                        <property>fcs/parking-brake-sum</property>
                        <property>/controls/gear/brake-right</property>
						<property>/controls/gear/brake-left</property>
                    </max>
                </function>
                <output>fcs/right-brake-cmd-norm</output>
            </fcs_function>
        </channel>

	</flight_control>


<!-- **********************************************************************
                                    AERODYNAMICS
     *******************************************************************-->
	<!-- Link to the aerodynamics file -->
	<aerodynamics file="ProMecc-Freccia_aero.xml"/>

 <external_reactions>
 </external_reactions>

</fdm_config>
