<?xml version="1.0"?>
<!--
Generic Autopilot
  Author:         Bill Galbraith
  Date:           Spring 2015
-->


<autopilot name="autopilot">

  <property>ap/longitudinal-cmd</property>
  <property>ap/lateral-cmd</property>
  <property>ap/directional-cmd</property>

</autopilot>
