<?xml version="1.0"?>
<?xml-stylesheet type="text/xsl" href="http://jsbsim.sourceforge.net/JSBSim.xsl"?>

<fdm_config name="ProMecc-Freccia" version="2.0" release="ALPHA"
   xmlns:xsi="http://www.w3.org/2001/XMLSchema-instance"
   xsi:noNamespaceSchemaLocation="http://jsbsim.sourceforge.net/JSBSim.xsd">

 <fileheader>
  <author> Aeromatic v 3.3.15 </author>
  <filecreationdate> 24 Sep 2021 </filecreationdate>
  <version>$Revision: 1.80 $</version>
  <description>
	Models a ProMecc-Freccia.
    *	Start Point.
  </description>

  <author> Salvatore De Astis </author>
  <filecreationdate> 28 Sep 2021 </filecreationdate>
  <version>$Revision: 1.90 $</version>
  <description>
	Models a ProMecc-Freccia.
    *	Datcom+	stability deriatives integrated.
	*	Tuning of : Metrics, Mass Balance, Point Masses,
		Ground Reaction, Flight Comtrols
  </description>
 </fileheader>

<!--
  File:     ProMecc-Freccia.xml
  Inputs:
    name:          ProMecc-Freccia
    type:          Single engine WWII Fighter, Military Trainer, Aerobatic, Air Racer
    stall speed:   41.04kts
    max weight:    1041.86 lb
    length:        23.78 ft
    wing:
     span:         28.80 ft
     area:         109.04 sq-ft
     mean chord:   5.13 ft
     aspect ratio: 7.54:1
     taper ratio:  1.57:1
     incidence:    0.00 degrees
     dihedral:     5.00 degrees
     sweep:        1.00 degrees

    no. engines:   1
    engine type:   Piston Engine
    engine layout: forward fuselage

    gear type:     tricycle
    steering type: steering
    retractable?:  no

  Outputs:
    wing loading:       9.56 lb/sq-ft
     - thickness ratio: 8.02%
    payload:            264.28 lbs
    CL-alpha:           5.33 per radian
    CL-0:               0.37
    CL-max:             1.68
    CD-0:               0.02
    K:                  0.06
    Mcrit:              0.75

    min. turn radius    82.31 ft
    max. turn rate:     0.93 deg/s
-->

 <metrics>
   <wingarea  unit="FT2">   109.04 </wingarea>
   <wingspan  unit="FT" >    28.80 </wingspan>
   <wing_incidence unit="DEG"> 0.00 </wing_incidence>
   <chord     unit="FT" >     5.13 </chord>
   <htailarea unit="FT2">    23.68 </htailarea>
   <htailarm  unit="FT" >    12.75 </htailarm>
   <vtailarea  unit="FT2">   12.06 </vtailarea>
   <vtailarm  unit="FT" >    12.16 </vtailarm>

   <!-- Original CG from Aeromatic -->
   <!--location name="AERORP" unit="IN">
     <x>   132.44 </x>
     <y>     0.00 </y>
     <z>     0.00 </z>
   </location-->

   <!-- AERORP at 32% MAC NACA 63.2 412 -->
   <location name="AERORP" unit="IN">
	 <x>    86.08 </x>
     <y>     0.00 </y>
     <z>   -10.00 </z>
   </location>

   <location name="EYEPOINT" unit="IN">
     <x>  102.576 </x>
     <y>  -11.130 </y>
     <z>   17.208 </z>
   </location>
   <location name="VRP" unit="IN">
     <x>     0.0 </x>
     <y>     0.0 </y>
     <z>     0.0 </z>
   </location>
 </metrics>

 <mass_balance>
   <ixx unit="SLUG*FT2">    305.28 </ixx>
   <iyy unit="SLUG*FT2">    370.21 </iyy>
   <izz unit="SLUG*FT2">    615.71 </izz>
   <emptywt unit="LBS" >    650.47 </emptywt>

   <!-- Original CG from Aeromatic -->
   <!--location name="CG" unit="IN">
     <x>   129.40 </x>
     <y>     0.00 </y>
     <z>    -7.13 </z>
   </location-->

   <!-- Original CG from DATCOM+ -->
   <!-- 25% MAC at empty weight -->
   <location name="CG" unit="IN">
      <x>    82.80  </x>
	  <y>      .00  </y>
	  <z>   -10.00  </z>
   </location>

	<pointmass name="PILOT">
		<weight unit="LBS"> 176.0 </weight>
		<location name="POINTMASS" unit="IN">
		<x>  82.07  </x>
		<y> -10.00 </y>
		<z> -13.00 </z>
		</location>
	</pointmass>

	<pointmass name="CO-PILOT">
		<weight unit="LBS"> 0.0 </weight>
		<location name="POINTMASS" unit="IN">
		<x>  82.07  </x>
		<y>  10.00 </y>
		<z> -13.00 </z>
		</location>
	</pointmass>

	<pointmass name="LUGGAGE">
		<weight unit="LBS"> 0.0 </weight>
		<location name="POINTMASS" unit="IN">
		<x> 119.685 </x>
		<y>   0.000 </y>
		<z>   0.000 </z>
		</location>
	</pointmass>

 </mass_balance>

 <propulsion>

   <engine file="ROTAX912ULS">
    <location unit="IN">
      <x>    36.00 </x>
      <y>     0.00 </y>
      <z>     0.00 </z>
    </location>
    <orient unit="DEG">
      <pitch>     0.00 </pitch>
       <roll>     0.00 </roll>
        <yaw>     0.00 </yaw>
    </orient>
    <feed> 0 </feed>
    <feed> 1 </feed>

    <thruster file="DUCHELICES-SWIRL3">
     <sense> 1 </sense>
     <location unit="IN">
       <x>    36.00 </x>
       <y>     0.00 </y>
       <z>     0.00 </z>
     </location>
     <orient unit="DEG">
       <pitch>     0.00 </pitch>
        <roll>     0.00 </roll>
         <yaw>     0.00 </yaw>
     </orient>
    </thruster>
  </engine>

  <tank type="FUEL" number="0">
     <location unit="IN">
       <x>  90.551 </x>
       <y> -22.677 </y>
       <z> -12.000 </z>
     </location>
     <capacity unit="LBS">  87.47 </capacity>  <!-- 55l of fuel -->
     <contents unit="LBS">  36.71 </contents>
	 <type>AVGAS</type>
  </tank>

  <tank type="FUEL" number="1">
     <location unit="IN">
       <x>  90.551 </x>
       <y>  22.677 </y>
       <z> -12.000 </z>
     </location>
     <capacity unit="LBS">  87.47 </capacity> <!-- 55l of fuel -->
     <contents unit="LBS">  36.71 </contents>
	 <type>AVGAS</type>
  </tank>

 </propulsion>

 <ground_reactions>

  <contact type="BOGEY" name="NOSE">
   <location unit="IN">
     <x>  36.614 </x>
     <y>   0.000 </y>
     <z> -35.078 </z>
   </location>
   <static_friction>  0.80 </static_friction>
   <dynamic_friction> 0.50 </dynamic_friction>
   <rolling_friction> 0.02 </rolling_friction>
   <spring_coeff unit="LBS/FT">      2000 </spring_coeff>
   <damping_coeff unit="LBS/FT/SEC">  500 </damping_coeff>
   <max_steer unit="DEG"> 10.00 </max_steer>
   <brake_group>NONE</brake_group>
   <retractable>0</retractable>
  </contact>

  <contact type="BOGEY" name="LEFT_MAIN">
   <location unit="IN">
     <x>  95.354 </x>
     <y> -31.496 </y>
     <z> -35.078 </z>
   </location>
   <static_friction>  0.80 </static_friction>
   <dynamic_friction> 0.50 </dynamic_friction>
   <rolling_friction> 0.02 </rolling_friction>
   <spring_coeff unit="LBS/FT">       1220 </spring_coeff>
   <damping_coeff unit="LBS/FT/SEC">   460 </damping_coeff>
   <max_steer unit="DEG">0</max_steer>
   <brake_group>LEFT</brake_group>
   <retractable>0</retractable>
  </contact>

  <contact type="BOGEY" name="RIGHT_MAIN">
   <location unit="IN">
     <x>  95.354 </x>
     <y>  31.496 </y>
     <z> -35.078 </z>
   </location>
   <static_friction>  0.80 </static_friction>
   <dynamic_friction> 0.50 </dynamic_friction>
   <rolling_friction> 0.02 </rolling_friction>
   <spring_coeff unit="LBS/FT">       1220 </spring_coeff>
   <damping_coeff unit="LBS/FT/SEC">   460 </damping_coeff>
   <max_steer unit="DEG">0</max_steer>
   <brake_group>RIGHT</brake_group>
   <retractable>0</retractable>
  </contact>

  <contact type="STRUCTURE" name="LEFT_WING_TIP">
    <location unit="IN">
     <x>  95.275 </x>
     <y>-172.480 </y>
     <z>   0.000 </z>
    </location>
    <static_friction>  1.00 </static_friction>
    <dynamic_friction> 1.00 </dynamic_friction>
    <spring_coeff unit="LBS/FT">        1041.86 </spring_coeff>
    <damping_coeff unit="LBS/FT/SEC">   1041.86 </damping_coeff>
  </contact>

  <contact type="STRUCTURE" name="RIGHT_WING_TIP">
    <location unit="IN">
     <x>  95.275 </x>
     <y> 172.480 </y>
     <z>   0.000 </z>
    </location>
    <static_friction>  1.00 </static_friction>
    <dynamic_friction> 1.00 </dynamic_friction>
    <spring_coeff unit="LBS/FT">       1041.86 </spring_coeff>
    <damping_coeff unit="LBS/FT/SEC">  1041.86 </damping_coeff>
  </contact>

  <contact type="STRUCTURE" name="TAIL_SKID">
   <location unit="IN">
    <x> 231.889 </x>
    <y>   0.000 </y>
    <z>  12.834 </z>
   </location>
   <static_friction> 0.5 </static_friction>
   <dynamic_friction> 0.25 </dynamic_friction>
   <spring_coeff unit="LBS/FT">       2000 </spring_coeff>
   <damping_coeff unit="LBS/FT/SEC">  1000 </damping_coeff>
  </contact>

 </ground_reactions>

 <system file="Conventional Controls.xml"/>
 <system file="Landing Gear.xml"/>
 <system file="Flaps.xml"/>

 <flight_control name="FCS: ProMecc-Freccia">

 </flight_control>

 <aerodynamics>

 	<alphalimits unit="DEG">
	  <min>  -16.00    </min>
	  <max>   50.00    </max>
	</alphalimits>

      <function name="aero/function/ground-effect-factor-lift">
         <description>Change in lift due to ground effect factor</description>
         <product>
            <table>
               <independentVar lookup="row">aero/h_b-mac-ft</independentVar>
               <tableData>
                  0.0  1.203
                  0.1  1.127
                  0.15 1.090
                  0.2  1.073
                  0.3  1.046
                  0.4  1.055
                  0.5  1.019
                  0.6  1.013
                  0.7  1.008
                  0.8  1.006
                  0.9  1.003
                  1.0  1.002
                  1.1  1.0
               </tableData>
            </table>
         </product>
      </function>

      <function name="aero/function/ground-effect-factor-drag">
         <description>Change in drag due to ground effect</description>
         <product>
            <table>
               <independentVar lookup="row">aero/h_b-mac-ft</independentVar>
               <tableData>
                  0.0  0.480
                  0.1  0.515
                  0.15 0.629
                  0.2  0.709
                  0.3  0.815
                  0.4  0.882
                  0.5  0.928
                  0.6  0.962
                  0.7  0.988
                  0.8  1.0
                  0.9  1.0
                  1.0  1.0
                  1.1  1.0
               </tableData>
            </table>
         </product>
      </function>

	<function name="aero/function/ailerons-pos-sum-deg">
		<description>Add the two aileron, required for Roll axis</description>
		<sum>
			<property>fcs/left-aileron-pos-deg</property>
			<property>-fcs/right-aileron-pos-deg</property>
		</sum>
	</function>

  <axis name="LIFT">

    <function name="aero/force/Lift_propwash">
      <description>Delta lift due to propeller induced velocity</description>
      <product>
         <property>propulsion/engine[0]/thrust-coefficient</property>
          <property>aero/qbar-psf</property>
          <property>metrics/Sw-sqft</property>
          <table>
            <independentVar lookup="row">aero/alpha-rad</independentVar>
            <independentVar lookup="column">fcs/flap-pos-deg</independentVar>
            <tableData>
                     0.0     60.0
              -0.28  0.000   0.000
               0.00  0.076   0.204
               0.27  0.348   0.929
               0.55  0.000   0.000
            </tableData>
          </table>
      </product>
    </function>

    <!-- Lift above 0.85 and below -0.85 is generalised -->
    <function name="aero/force/Lift_alpha_CLwbh">
      <description>Lift due to alpha</description>
      <product>
	      <property>aero/function/ground-effect-factor-lift</property>
          <property>aero/qbar-psf</property>
          <property>metrics/Sw-sqft</property>
          <!--table>
            <independentVar lookup="row">aero/alpha-rad</independentVar>
            <tableData>
              -1.57  0.0000
              -1.22 -0.5912
              -1.05 -0.7965
              -0.88 -0.9198
              -0.25 -0.3026
               0.00  0.3678
               0.31  1.6759
               0.38  0.6704
               0.88  1.0802
               1.05  0.9355
               1.22  0.6944
               1.57  0.0000
            </tableData>
          </table-->
		       <table>
                  <independentVar lookup="row">aero/alpha-deg</independentVar>
                  <tableData>
                       -16.00        -1.470
                       -8.000        -.5685
                       -6.000        -.3476
                       -4.000        -.1346
                       -2.000         .7198E-01
                         .000         .2865
                        2.000         .5099
                        4.000         .7405
                        6.000         .9778
                        8.000         1.223
                        9.000         1.340
                        10.00         1.442
                        12.00         1.630
                        14.00         1.796
                        16.00         1.923
                        18.00         1.874
                        20.00         1.128
                        30.00        -1.021
                        40.00        -1.316
                        50.00        -.9438
                  </tableData>
               </table>
      </product>
    </function>

    <function name="aero/force/Lift_pitch_rate_CLq">
        <description>Lift due to pitch rate</description>
        <product>
          <property>aero/qbar-psf</property>
          <property>metrics/Sw-sqft</property>
          <property>velocities/q-aero-rad_sec</property>
          <property>aero/ci2vel</property>
          <!--value> 4.4031 </value-->
		  <value>57.29577951</value>
               <table>
                  <independentVar lookup="row">aero/alpha-deg</independentVar>
                  <tableData>
                       -16.00         .1590
                       -8.000         .1590
                       -6.000         .1590
                       -4.000         .1590
                       -2.000         .1590
                         .000         .1590
                        2.000         .1590
                        4.000         .1590
                        6.000         .1590
                        8.000         .1590
                        9.000         .1590
                        10.00         .1590
                        12.00         .1590
                        14.00         .1590
                        16.00         .1590
                        18.00         .1590
                        20.00         .1590
                        30.00         .1590
                        40.00         .1590
                        50.00         .1590
                  </tableData>
               </table>
        </product>
      </function>

      <function name="aero/force/Lift_alpha_rate_CLad">
        <description>Lift due to alpha rate</description>
        <product>
           <property>aero/qbar-psf</property>
           <property>metrics/Sw-sqft</property>
           <!--property>aero/alphadot-rad_sec</property-->
           <property>aero/ci2vel</property>
           <!--value> 1.8462 </value-->
		   <property>aero/alphadot-deg_sec</property>
               <table>
                  <independentVar lookup="row">aero/alpha-deg</independentVar>
                  <tableData>
                       -16.00         .5491E-01
                       -8.000         .5793E-01
                       -6.000         .5850E-01
                       -4.000         .5837E-01
                       -2.000         .5949E-01
                         .000         .6052E-01
                        2.000         .6058E-01
                        4.000         .6044E-01
                        6.000         .5931E-01
                        8.000         .5614E-01
                        9.000         .5173E-01
                        10.00         .4446E-01
                        12.00         .3271E-01
                        14.00         .2324E-01
                        16.00        -.7978E-02
                        18.00        -.7593E-01
                        20.00        -.1116
                        30.00        -.3388E-01
                        40.00         .3878E-02
                        50.00         .4532E-02
                  </tableData>
               </table>
        </product>
      </function>

    <function name="aero/force/Lift_elevator_CLDe">
       <description>Lift due to Elevator Deflection</description>
       <product>
           <property>aero/qbar-psf</property>
           <property>metrics/Sw-sqft</property>
           <!--property>fcs/elevator-pos-rad</property>
           <value> 0.5825 </value-->
               <table>
                  <independentVar lookup="row">fcs/elevator-pos-deg</independentVar>
                  <tableData>
                       -20.00        -.1316
                       -15.00        -.1230
                       -10.00        -.8568E-01
                       -5.000        -.4284E-01
                         .000         .8568E-04
                        5.000         .4284E-01
                        10.00         .8568E-01
                        15.00         .1230
                        20.00         .1316
                  </tableData>
               </table>
       </product>
    </function>

    <!--function name="aero/force/Lift_flap">
       <description>Delta Lift due to flaps</description>
       <product>
           <property>aero/qbar-psf</property>
           <property>metrics/Sw-sqft</property>
           <property>fcs/flap-pos-deg</property>
           <value> 0.0092 </value>
       </product>
    </function-->

         <function name="aero/force/Lift_Flap_CLdF2L">
            <description>
               Lift Coefficient due to Left Single Slotted Flaps Deflection
               Positive surface deflection is trailing edge down
               Ultimately, we will feed this left flap pos
            </description>
            <product>
               <property>aero/qbar-psf</property>
               <property>metrics/Sw-sqft</property>
               <table>
                  <independentVar lookup="row">fcs/flap-pos-deg</independentVar>
                  <tableData>
                         .000          .000
                        5.000         .2890E-01
                        10.00         .5757E-01
                        15.00         .8479E-01
                        20.00         .1110
                        25.00         .1334
                        30.00         .1518
                        35.00         .1654
                  </tableData>
               </table>
            </product>
         </function>

         <function name="aero/force/Lift_Flap_CLdF2R">
            <description>
               Lift Coefficient due to Right Single Slotted Flaps Deflection
               Positive surface deflection is trailing edge down
               Ultimately, we will feed this right flap pos
            </description>
            <product>
               <property>aero/qbar-psf</property>
               <property>metrics/Sw-sqft</property>
               <table>
                  <independentVar lookup="row">fcs/flap-pos-deg</independentVar>
                  <tableData>
                         .000          .000
                        5.000         .2890E-01
                        10.00         .5757E-01
                        15.00         .8479E-01
                        20.00         .1110
                        25.00         .1334
                        30.00         .1518
                        35.00         .1654
                  </tableData>
               </table>
            </product>
         </function>

         <function name="aero/force/Lift_Ail_CLdaL">
            <description>
               Lift Coefficient due to Left Single Slotted Aileron Deflection
               Positive surface deflection is trailing edge down
               Ultimately, we will feed this left flap pos
            </description>
            <product>
               <property>aero/qbar-psf</property>
               <property>metrics/Sw-sqft</property>
               <table>
                  <independentVar lookup="row">-fcs/left-aileron-pos-deg</independentVar>
                  <tableData>
                       -12.00        -.5994E-01
                       -9.000        -.4532E-01
                       -6.000        -.3027E-01
                       -3.000        -.1516E-01
                         .000          .000
                        6.000         .3027E-01
                        12.00         .5994E-01
                        18.00         .8793E-01
                        24.00         .1134
                  </tableData>
               </table>
            </product>
         </function>

         <function name="aero/force/Lift_Ail_CLdaR">
            <description>
               Lift Coefficient due to Right Single Slotted Aileron Deflection
               Positive surface deflection is trailing edge down
               Ultimately, we will feed this right flap pos
            </description>
            <product>
               <property>aero/qbar-psf</property>
               <property>metrics/Sw-sqft</property>
               <table>
                  <independentVar lookup="row">-fcs/right-aileron-pos-deg</independentVar>
                  <tableData>
                       -12.00        -.5994E-01
                       -9.000        -.4532E-01
                       -6.000        -.3027E-01
                       -3.000        -.1516E-01
                         .000          .000
                        6.000         .3027E-01
                        12.00         .5994E-01
                        18.00         .8793E-01
                        24.00         .1134
                  </tableData>
               </table>
            </product>
         </function>

  </axis>

  <axis name="DRAG">

    <!-- CD0 is based on fuselage, wing, horizontal- en vertical tail -->
    <!-- Antennas, struts and wires are not taken into account        -->
    <!-- CD for gear (fixed and retractable) is defined below         -->
    <!--function name="aero/force/Drag_minimum">
       <description>Minimum drag</description>
       <product>
          <property>aero/qbar-psf</property>
          <property>metrics/Sw-sqft</property>
          <value> 0.0202 </value>
       </product>
    </function>

    <function name="aero/force/Drag_alpha">
       <description>Drag due to alpha</description>
       <product>
          <property>aero/qbar-psf</property>
          <property>metrics/Sw-sqft</property>
          <table>
            <independentVar lookup="row">aero/alpha-rad</independentVar>
            <tableData>
             -1.57    1.4108
             -0.25    0.0453
              0.00    0.0000
              0.25    0.0453
              1.57    1.4108
            </tableData>
          </table>
       </product>
    </function-->

         <function name="aero/force/Drag_Basic_CD">
            <description>
               Basic Drag Coefficient
               Sense: Always positive
               Main contributor to Phugoid damping: Greater Cd, Better damping
            </description>
            <product>
               <property>aero/function/ground-effect-factor-lift</property>
               <property>aero/qbar-psf</property>
               <property>metrics/Sw-sqft</property>
               <table>
                  <independentVar lookup="row">aero/alpha-deg</independentVar>
                  <tableData>
                       -16.00         .1231
                       -8.000         .3569E-01
                       -6.000         .2562E-01
                       -4.000         .2012E-01
                       -2.000         .1877E-01
                         .000         .2156E-01
                        2.000         .2908E-01
                        4.000         .4146E-01
                        6.000         .5933E-01
                        8.000         .8302E-01
                        9.000         .9634E-01
                        10.00         .1094
                        12.00         .1364
                        14.00         .1653
                        16.00         .1924
                        18.00         .1980
                        20.00         .1405
                        30.00         .2598
                        40.00         .5064
                        50.00         .7335
                  </tableData>
               </table>
            </product>
         </function>

    <!--function name="aero/force/Drag_induced">
       <description>Induced drag</description>
         <product>
           <property>aero/qbar-psf</property>
           <property>metrics/Sw-sqft</property>
           <property>aero/cl-squared</property>
           <value> 0.0471 </value>
         </product>
    </function-->

    <!--function name="aero/force/Drag_mach">
       <description>Drag due to mach</description>
        <product>
          <property>aero/qbar-psf</property>
          <property>metrics/Sw-sqft</property>
          <table>
            <independentVar lookup="row">velocities/mach</independentVar>
            <tableData>
                0.00    0.0000
                0.75    0.0000
                1.10    0.0230
                1.80    0.0150
            </tableData>
          </table>
        </product>
    </function-->

    <function name="aero/force/Drag_beta">
       <description>Drag due to sideslip</description>
       <product>
          <property>aero/qbar-psf</property>
          <property>metrics/Sw-sqft</property>
          <table>
            <independentVar lookup="row">aero/beta-rad</independentVar>
            <tableData>
              -1.57    1.2300
              -0.26    0.0500
               0.00    0.0000
               0.26    0.0500
               1.57    1.2300
            </tableData>
          </table>
       </product>
    </function>

    <!--function name="aero/force/Drag_elevator">
       <description>Drag due to Elevator Deflection</description>
       <product>
           <property>aero/qbar-psf</property>
           <property>metrics/Sw-sqft</property>
           <abs><property>fcs/elevator-pos-rad</property></abs>
           <value> 0.0400 </value>
       </product>
    </function-->

         <function name="aero/force/Drag_elevator_CdDe">
            <description>
               Drag Coefficient due to Elevator Deflection
               Positive surface deflection is trailing edge down
            </description>
            <product>
               <property>aero/qbar-psf</property>
               <property>metrics/Sw-sqft</property>
               <table>
                  <independentVar lookup="row">aero/alpha-deg</independentVar>
                  <independentVar lookup="column">fcs/elevator-pos-deg</independentVar>
                  <tableData>
                                     -20.00        -15.00        -10.00        -5.000          .000         5.000         10.00         15.00         20.00
                       -16.00         .1146E-01     .1035E-01     .6122E-02     .2442E-02    -.3644E-05    -.1204E-02    -.1171E-02    -.1301E-03     .2461E-03
                       -8.000         .6956E-02     .6138E-02     .3193E-02     .9775E-03    -.7147E-06     .2603E-03     .1758E-02     .4078E-02     .4751E-02
                       -6.000         .5919E-02     .5169E-02     .2518E-02     .6402E-03    -.4000E-07     .5977E-03     .2433E-02     .5047E-02     .5788E-02
                       -4.000         .4873E-02     .4192E-02     .1838E-02     .3000E-03     .6402E-06     .9378E-03     .3113E-02     .6024E-02     .6834E-02
                       -2.000         .3829E-02     .3217E-02     .1159E-02    -.3932E-04     .1319E-05     .1277E-02     .3792E-02     .6999E-02     .7878E-02
                         .000         .2836E-02     .2289E-02     .5131E-03    -.3624E-03     .1965E-05     .1600E-02     .4438E-02     .7927E-02     .8871E-02
                        2.000         .1840E-02     .1359E-02    -.1344E-03    -.6861E-03     .2613E-05     .1924E-02     .5086E-02     .8857E-02     .9867E-02
                        4.000         .8495E-03     .4336E-03    -.7786E-03    -.1008E-02     .3257E-05     .2246E-02     .5730E-02     .9782E-02     .1086E-01
                        6.000        -.1527E-03    -.5026E-03    -.1430E-02    -.1334E-02     .3909E-05     .2572E-02     .6382E-02     .1072E-01     .1186E-01
                        8.000        -.1196E-02    -.1478E-02    -.2109E-02    -.1673E-02     .4587E-05     .2911E-02     .7060E-02     .1169E-01     .1290E-01
                        9.000        -.1758E-02    -.2003E-02    -.2475E-02    -.1856E-02     .4953E-05     .3094E-02     .7426E-02     .1222E-01     .1347E-01
                        10.00        -.2389E-02    -.2592E-02    -.2885E-02    -.2061E-02     .5363E-05     .3299E-02     .7836E-02     .1281E-01     .1410E-01
                        12.00        -.3869E-02    -.3975E-02    -.3848E-02    -.2543E-02     .6324E-05     .3781E-02     .8799E-02     .1419E-01     .1558E-01
                        14.00        -.5545E-02    -.5540E-02    -.4937E-02    -.3087E-02     .7416E-05     .4325E-02     .9888E-02     .1576E-01     .1725E-01
                        16.00        -.7580E-02    -.7441E-02    -.6261E-02    -.3749E-02     .8738E-05     .4987E-02     .1121E-01     .1766E-01     .1929E-01
                        18.00        -.1075E-01    -.1040E-01    -.8320E-02    -.4779E-02     .1080E-04     .6017E-02     .1327E-01     .2061E-01     .2245E-01
                        20.00        -.1597E-01    -.1528E-01    -.1172E-01    -.6477E-02     .1420E-04     .7715E-02     .1667E-01     .2549E-01     .2768E-01
                        30.00        -.3636E-01    -.3433E-01    -.2498E-01    -.1311E-01     .2746E-04     .1435E-01     .2993E-01     .4454E-01     .4807E-01
                        40.00        -.4805E-01    -.4525E-01    -.3258E-01    -.1691E-01     .3502E-04     .1815E-01     .3753E-01     .5546E-01     .5976E-01
                        50.00        -.5959E-01    -.5603E-01    -.4008E-01    -.2066E-01     .4263E-04     .2190E-01     .4504E-01     .6624E-01     .7130E-01
                  </tableData>
               </table>
            </product>
         </function>

         <function name="aero/force/Drag_Ail_CdDaL">
            <description>
               Drag Coefficient due to Left Single Slotted Flaps Deflection
               Positive surface deflection is trailing edge down
               Ultimately, we will feed this left flap pos
            </description>
            <product>
               <property>aero/qbar-psf</property>
               <property>metrics/Sw-sqft</property>
               <table>
                  <independentVar lookup="row">aero/alpha-deg</independentVar>
                  <independentVar lookup="column">fcs/left-aileron-pos-deg</independentVar>
                  <tableData>
                                     -12.00        -9.000        -6.000        -3.000          .000         6.000         12.00         18.00         24.00
                       -16.00         .6189E-02     .4504E-02     .2889E-02     .1387E-02      .000        -.2406E-02    -.4297E-02    -.5655E-02    -.6533E-02
                       -8.000         .2602E-02     .1792E-02     .1077E-02     .4793E-03      .000        -.5946E-03    -.7092E-03    -.3924E-03     .2554E-03
                       -6.000         .1705E-02     .1114E-02     .6243E-03     .2524E-03      .000        -.1418E-03     .1877E-03     .9232E-03     .1952E-02
                       -4.000         .8079E-03     .4362E-03     .1714E-03     .2555E-04      .000         .3111E-03     .1085E-02     .2239E-02     .3649E-02
                       -2.000        -.8902E-04    -.2418E-03    -.2815E-03    -.2013E-03      .000         .7640E-03     .1981E-02     .3554E-02     .5347E-02
                         .000        -.9859E-03    -.9199E-03    -.7344E-03    -.4282E-03      .000         .1217E-02     .2878E-02     .4870E-02     .7044E-02
                        2.000        -.1883E-02    -.1598E-02    -.1187E-02    -.6550E-03      .000         .1670E-02     .3775E-02     .6185E-02     .8741E-02
                        4.000        -.2780E-02    -.2276E-02    -.1640E-02    -.8819E-03      .000         .2123E-02     .4672E-02     .7501E-02     .1044E-01
                        6.000        -.3677E-02    -.2954E-02    -.2093E-02    -.1109E-02      .000         .2576E-02     .5569E-02     .8816E-02     .1213E-01
                        8.000        -.4573E-02    -.3632E-02    -.2546E-02    -.1336E-02      .000         .3028E-02     .6466E-02     .1013E-01     .1383E-01
                        9.000        -.5022E-02    -.3971E-02    -.2772E-02    -.1449E-02      .000         .3255E-02     .6914E-02     .1079E-01     .1468E-01
                        10.00        -.5470E-02    -.4310E-02    -.2999E-02    -.1563E-02      .000         .3481E-02     .7363E-02     .1145E-01     .1553E-01
                        12.00        -.6367E-02    -.4988E-02    -.3452E-02    -.1789E-02      .000         .3934E-02     .8260E-02     .1276E-01     .1723E-01
                        14.00        -.7264E-02    -.5666E-02    -.3905E-02    -.2016E-02      .000         .4387E-02     .9156E-02     .1408E-01     .1892E-01
                        16.00        -.8161E-02    -.6344E-02    -.4357E-02    -.2243E-02      .000         .4840E-02     .1005E-01     .1539E-01     .2062E-01
                        18.00        -.9058E-02    -.7022E-02    -.4810E-02    -.2470E-02      .000         .5293E-02     .1095E-01     .1671E-01     .2232E-01
                        20.00        -.9955E-02    -.7700E-02    -.5263E-02    -.2697E-02      .000         .5746E-02     .1185E-01     .1803E-01     .2401E-01
                        30.00        -.1444E-01    -.1109E-01    -.7528E-02    -.3831E-02      .000         .8010E-02     .1633E-01     .2460E-01     .3250E-01
                        40.00        -.1892E-01    -.1448E-01    -.9792E-02    -.4966E-02      .000         .1027E-01     .2082E-01     .3118E-01     .4098E-01
                        50.00        -.2341E-01    -.1787E-01    -.1206E-01    -.6100E-02      .000         .1254E-01     .2530E-01     .3776E-01     .4947E-01
                  </tableData>
               </table>
            </product>
         </function>

         <function name="aero/force/Drag_Ail_CdDaR">
            <description>
               Drag Coefficient due to Right Single Slotted Flaps Deflection
               Positive surface deflection is trailing edge down
               Ultimately, we will feed this right flap pos
            </description>
            <product>
               <property>aero/qbar-psf</property>
               <property>metrics/Sw-sqft</property>
               <table>
                  <independentVar lookup="row">aero/alpha-deg</independentVar>
                  <independentVar lookup="column">fcs/right-aileron-pos-deg</independentVar>
                  <tableData>
                                     -12.00        -9.000        -6.000        -3.000          .000         6.000         12.00         18.00         24.00
                       -16.00         .6189E-02     .4504E-02     .2889E-02     .1387E-02      .000        -.2406E-02    -.4297E-02    -.5655E-02    -.6533E-02
                       -8.000         .2602E-02     .1792E-02     .1077E-02     .4793E-03      .000        -.5946E-03    -.7092E-03    -.3924E-03     .2554E-03
                       -6.000         .1705E-02     .1114E-02     .6243E-03     .2524E-03      .000        -.1418E-03     .1877E-03     .9232E-03     .1952E-02
                       -4.000         .8079E-03     .4362E-03     .1714E-03     .2555E-04      .000         .3111E-03     .1085E-02     .2239E-02     .3649E-02
                       -2.000        -.8902E-04    -.2418E-03    -.2815E-03    -.2013E-03      .000         .7640E-03     .1981E-02     .3554E-02     .5347E-02
                         .000        -.9859E-03    -.9199E-03    -.7344E-03    -.4282E-03      .000         .1217E-02     .2878E-02     .4870E-02     .7044E-02
                        2.000        -.1883E-02    -.1598E-02    -.1187E-02    -.6550E-03      .000         .1670E-02     .3775E-02     .6185E-02     .8741E-02
                        4.000        -.2780E-02    -.2276E-02    -.1640E-02    -.8819E-03      .000         .2123E-02     .4672E-02     .7501E-02     .1044E-01
                        6.000        -.3677E-02    -.2954E-02    -.2093E-02    -.1109E-02      .000         .2576E-02     .5569E-02     .8816E-02     .1213E-01
                        8.000        -.4573E-02    -.3632E-02    -.2546E-02    -.1336E-02      .000         .3028E-02     .6466E-02     .1013E-01     .1383E-01
                        9.000        -.5022E-02    -.3971E-02    -.2772E-02    -.1449E-02      .000         .3255E-02     .6914E-02     .1079E-01     .1468E-01
                        10.00        -.5470E-02    -.4310E-02    -.2999E-02    -.1563E-02      .000         .3481E-02     .7363E-02     .1145E-01     .1553E-01
                        12.00        -.6367E-02    -.4988E-02    -.3452E-02    -.1789E-02      .000         .3934E-02     .8260E-02     .1276E-01     .1723E-01
                        14.00        -.7264E-02    -.5666E-02    -.3905E-02    -.2016E-02      .000         .4387E-02     .9156E-02     .1408E-01     .1892E-01
                        16.00        -.8161E-02    -.6344E-02    -.4357E-02    -.2243E-02      .000         .4840E-02     .1005E-01     .1539E-01     .2062E-01
                        18.00        -.9058E-02    -.7022E-02    -.4810E-02    -.2470E-02      .000         .5293E-02     .1095E-01     .1671E-01     .2232E-01
                        20.00        -.9955E-02    -.7700E-02    -.5263E-02    -.2697E-02      .000         .5746E-02     .1185E-01     .1803E-01     .2401E-01
                        30.00        -.1444E-01    -.1109E-01    -.7528E-02    -.3831E-02      .000         .8010E-02     .1633E-01     .2460E-01     .3250E-01
                        40.00        -.1892E-01    -.1448E-01    -.9792E-02    -.4966E-02      .000         .1027E-01     .2082E-01     .3118E-01     .4098E-01
                        50.00        -.2341E-01    -.1787E-01    -.1206E-01    -.6100E-02      .000         .1254E-01     .2530E-01     .3776E-01     .4947E-01
                  </tableData>
               </table>
            </product>
         </function>

    <function name="aero/force/Drag_gear">
       <description>Drag due to gear</description>
         <product>
           <property>aero/qbar-psf</property>
           <property>metrics/Sw-sqft</property>
           <value> 0.0040 </value>
         </product>
    </function>

    <!--function name="aero/force/Drag_flap">
       <description>Drag due to flaps</description>
         <product>
           <property>aero/qbar-psf</property>
           <property>metrics/Sw-sqft</property>
           <property>fcs/flap-pos-deg</property>
           <value> 0.0012 </value>
         </product>
    </function-->

         <function name="aero/force/Drag_Flap_CdDf2L">
            <description>
               Drag Coefficient due to Left Single Slotted Flaps Deflection
               Positive surface deflection is trailing edge down
               Ultimately, we will feed this left flap pos
            </description>
            <product>
               <property>aero/qbar-psf</property>
               <property>metrics/Sw-sqft</property>
               <table>
                  <independentVar lookup="row">aero/alpha-deg</independentVar>
                  <independentVar lookup="column">fcs/flap-pos-deg</independentVar>
                  <tableData>
                                       .000         5.000         10.00         15.00         20.00         25.00         30.00         35.00
                       -16.00          .000        -.2141E-02    -.3995E-02    -.5505E-02    -.6728E-02    -.7596E-02    -.8184E-02    -.8550E-02
                       -8.000          .000        -.5823E-03    -.8891E-03    -.9305E-03    -.7408E-03    -.3994E-03     .2938E-05     .3745E-03
                       -6.000          .000        -.1925E-03    -.1126E-03     .2131E-03     .7560E-03     .1400E-02     .2050E-02     .2606E-02
                       -4.000          .000         .1972E-03     .6638E-03     .1357E-02     .2253E-02     .3199E-02     .4097E-02     .4837E-02
                       -2.000          .000         .5870E-03     .1440E-02     .2500E-02     .3750E-02     .4998E-02     .6143E-02     .7068E-02
                         .000          .000         .9768E-03     .2217E-02     .3644E-02     .5246E-02     .6798E-02     .8190E-02     .9299E-02
                        2.000          .000         .1367E-02     .2993E-02     .4788E-02     .6743E-02     .8597E-02     .1024E-01     .1153E-01
                        4.000          .000         .1756E-02     .3770E-02     .5931E-02     .8240E-02     .1040E-01     .1228E-01     .1376E-01
                        6.000          .000         .2146E-02     .4546E-02     .7075E-02     .9737E-02     .1220E-01     .1433E-01     .1599E-01
                        8.000          .000         .2536E-02     .5323E-02     .8219E-02     .1123E-01     .1399E-01     .1638E-01     .1822E-01
                        9.000          .000         .2731E-02     .5711E-02     .8790E-02     .1198E-01     .1489E-01     .1740E-01     .1934E-01
                        10.00          .000         .2926E-02     .6099E-02     .9362E-02     .1273E-01     .1579E-01     .1842E-01     .2046E-01
                        12.00          .000         .3316E-02     .6875E-02     .1051E-01     .1423E-01     .1759E-01     .2047E-01     .2269E-01
                        14.00          .000         .3705E-02     .7652E-02     .1165E-01     .1572E-01     .1939E-01     .2252E-01     .2492E-01
                        16.00          .000         .4095E-02     .8428E-02     .1279E-01     .1722E-01     .2119E-01     .2456E-01     .2715E-01
                        18.00          .000         .4485E-02     .9205E-02     .1394E-01     .1872E-01     .2299E-01     .2661E-01     .2938E-01
                        20.00          .000         .4875E-02     .9981E-02     .1508E-01     .2021E-01     .2479E-01     .2866E-01     .3161E-01
                        30.00          .000         .6824E-02     .1386E-01     .2080E-01     .2770E-01     .3379E-01     .3889E-01     .4277E-01
                        40.00          .000         .8772E-02     .1775E-01     .2652E-01     .3518E-01     .4278E-01     .4913E-01     .5392E-01
                        50.00          .000         .1072E-01     .2163E-01     .3223E-01     .4267E-01     .5178E-01     .5936E-01     .6508E-01
                  </tableData>
               </table>
            </product>
         </function>

         <function name="aero/force/Drag_Flap_CdDf2R">
            <description>
               Drag Coefficient due to Right Single Slotted Flaps Deflection
               Positive surface deflection is trailing edge down
               Ultimately, we will feed this right flap pos
            </description>
            <product>
               <property>aero/qbar-psf</property>
               <property>metrics/Sw-sqft</property>
               <table>
                  <independentVar lookup="row">aero/alpha-deg</independentVar>
                  <independentVar lookup="column">fcs/flap-pos-deg</independentVar>
                  <tableData>
                                       .000         5.000         10.00         15.00         20.00         25.00         30.00         35.00
                       -16.00          .000        -.2141E-02    -.3995E-02    -.5505E-02    -.6728E-02    -.7596E-02    -.8184E-02    -.8550E-02
                       -8.000          .000        -.5823E-03    -.8891E-03    -.9305E-03    -.7408E-03    -.3994E-03     .2938E-05     .3745E-03
                       -6.000          .000        -.1925E-03    -.1126E-03     .2131E-03     .7560E-03     .1400E-02     .2050E-02     .2606E-02
                       -4.000          .000         .1972E-03     .6638E-03     .1357E-02     .2253E-02     .3199E-02     .4097E-02     .4837E-02
                       -2.000          .000         .5870E-03     .1440E-02     .2500E-02     .3750E-02     .4998E-02     .6143E-02     .7068E-02
                         .000          .000         .9768E-03     .2217E-02     .3644E-02     .5246E-02     .6798E-02     .8190E-02     .9299E-02
                        2.000          .000         .1367E-02     .2993E-02     .4788E-02     .6743E-02     .8597E-02     .1024E-01     .1153E-01
                        4.000          .000         .1756E-02     .3770E-02     .5931E-02     .8240E-02     .1040E-01     .1228E-01     .1376E-01
                        6.000          .000         .2146E-02     .4546E-02     .7075E-02     .9737E-02     .1220E-01     .1433E-01     .1599E-01
                        8.000          .000         .2536E-02     .5323E-02     .8219E-02     .1123E-01     .1399E-01     .1638E-01     .1822E-01
                        9.000          .000         .2731E-02     .5711E-02     .8790E-02     .1198E-01     .1489E-01     .1740E-01     .1934E-01
                        10.00          .000         .2926E-02     .6099E-02     .9362E-02     .1273E-01     .1579E-01     .1842E-01     .2046E-01
                        12.00          .000         .3316E-02     .6875E-02     .1051E-01     .1423E-01     .1759E-01     .2047E-01     .2269E-01
                        14.00          .000         .3705E-02     .7652E-02     .1165E-01     .1572E-01     .1939E-01     .2252E-01     .2492E-01
                        16.00          .000         .4095E-02     .8428E-02     .1279E-01     .1722E-01     .2119E-01     .2456E-01     .2715E-01
                        18.00          .000         .4485E-02     .9205E-02     .1394E-01     .1872E-01     .2299E-01     .2661E-01     .2938E-01
                        20.00          .000         .4875E-02     .9981E-02     .1508E-01     .2021E-01     .2479E-01     .2866E-01     .3161E-01
                        30.00          .000         .6824E-02     .1386E-01     .2080E-01     .2770E-01     .3379E-01     .3889E-01     .4277E-01
                        40.00          .000         .8772E-02     .1775E-01     .2652E-01     .3518E-01     .4278E-01     .4913E-01     .5392E-01
                        50.00          .000         .1072E-01     .2163E-01     .3223E-01     .4267E-01     .5178E-01     .5936E-01     .6508E-01
                  </tableData>
               </table>
            </product>
         </function>

  </axis>

  <axis name="SIDE">

    <!--function name="aero/force/Side_beta">
       <description>Side force due to beta</description>
       <product>
           <property>aero/qbar-psf</property>
           <property>metrics/Sw-sqft</property>
           <property>aero/beta-rad</property>
           <value> -0.5152 </value>
       </product>
    </function-->

         <function name="aero/force/Side_beta_Cyb">
            <description>
               Side Force coefficient due to Sideslip(per degree)
                Contributes to damping of Dutch Roll mode
            </description>
            <product>
               <property>aero/qbar-psf</property>
               <property>metrics/Sw-sqft</property>
               <property>aero/beta-deg</property>
               <table>
                  <independentVar lookup="row">aero/alpha-deg</independentVar>
                  <tableData>
                       -16.00        -.9063E-02
                       -8.000        -.9063E-02
                       -6.000        -.9063E-02
                       -4.000        -.9063E-02
                       -2.000        -.9063E-02
                         .000        -.9063E-02
                        2.000        -.9063E-02
                        4.000        -.9063E-02
                        6.000        -.9063E-02
                        8.000        -.9063E-02
                        9.000        -.9063E-02
                        10.00        -.9063E-02
                        12.00        -.9063E-02
                        14.00        -.9063E-02
                        16.00        -.9063E-02
                        18.00        -.9063E-02
                        20.00        -.9063E-02
                        30.00        -.9063E-02
                        40.00        -.9063E-02
                        50.00        -.9063E-02
                  </tableData>
               </table>
            </product>
         </function>

    <!--function name="aero/force/Side_roll_rate">
       <description>Side force due to roll rate</description>
       <product>
           <property>aero/qbar-psf</property>
           <property>metrics/Sw-sqft</property>
           <property>aero/bi2vel</property>
           <property>velocities/p-aero-rad_sec</property>
           <table>
             <independentVar lookup="row">aero/Re</independentVar>
             <tableData>
                 2265572   0.3103
                 2492129   0.0272
                 3398358   0.0121
                 4531514   0.0068
             </tableData>
           </table>
       </product>
    </function-->

         <function name="aero/force/Side_roll_rate_Cyp">
            <description>
               Side Force Coefficient due to Roll Rate(per degree)
            </description>
            <product>
               <property>velocities/p-aero-rad_sec</property>
               <value>57.29577951</value>
               <property>aero/qbar-psf</property>
               <property>metrics/Sw-sqft</property>
               <property>aero/bi2vel</property>
               <table>
                  <independentVar lookup="row">aero/alpha-deg</independentVar>
                  <tableData>
                       -16.00        -.2472E-02
                       -8.000        -.2494E-02
                       -6.000        -.2488E-02
                       -4.000        -.2474E-02
                       -2.000        -.2454E-02
                         .000        -.2438E-02
                        2.000        -.2426E-02
                        4.000        -.2417E-02
                        6.000        -.2412E-02
                        8.000        -.2408E-02
                        9.000        -.2401E-02
                        10.00        -.2385E-02
                        12.00        -.2339E-02
                        14.00        -.2272E-02
                        16.00        -.2181E-02
                        18.00        -.1979E-02
                        20.00        -.1337E-02
                        30.00         .5527E-03
                        40.00         .1437E-02
                        50.00         .1833E-02
                  </tableData>
               </table>
            </product>
         </function>

         <!-- *************************
              Not calculated by DATCOM+
              *************************
         -->

    <function name="aero/force/Side_yaw_rate_Cyr">
       <description>
			Side Force due to Yaw Rate(DATCOM does not calculate)
            Effect is small
	  </description>
       <product>
           <property>aero/qbar-psf</property>
           <property>metrics/Sw-sqft</property>
           <property>aero/bi2vel</property>
           <property>velocities/r-aero-rad_sec</property>
           <value> 0.4352 </value>
       </product>
    </function>

    <function name="aero/force/Side_rudder_CyDr">
       <description>
			Side Force due to rudder(DATCOM does not calculate)
       </description>
       <product>
           <property>aero/qbar-psf</property>
           <property>metrics/Sw-sqft</property>
           <property>fcs/rudder-pos-rad</property>
           <value> 0.1555 </value>
       </product>
    </function>

  </axis>

  <axis name="PITCH">

    <function name="aero/moment/Pitch_propwash">
      <description>Pitch moment due to propeller induced velocity</description>
      <product>
          <property>propulsion/engine[0]/thrust-coefficient</property>
          <property>aero/qbar-psf</property>
          <property>metrics/Sw-sqft</property>
          <property>metrics/bw-ft</property>
          <table>
            <independentVar lookup="row">aero/alpha-rad</independentVar>
            <independentVar lookup="column">fcs/flap-pos-deg</independentVar>
            <tableData>
                     0.0     60.0
              -0.01  0.000   0.000
               0.00  0.041   0.110
               0.27  0.188   0.501
               0.35  0.000   0.000
            </tableData>
          </table>
      </product>
    </function>

    <function name="aero/moment/Pitch_alpha">
       <description>Pitch moment due to alpha</description>
       <product>
           <property>aero/qbar-psf</property>
           <property>metrics/Sw-sqft</property>
           <property>metrics/cbarw-ft</property>
           <!--property>aero/alpha-rad</property>
           <value> -1.1120 </value-->
               <table>
                  <independentVar lookup="row">aero/alpha-deg</independentVar>
                  <tableData>
                       -16.00         .3365
                       -8.000         .1154
                       -6.000         .6647E-01
                       -4.000         .1940E-01
                       -2.000        -.2531E-01
                         .000        -.6763E-01
                        2.000        -.1085
                        4.000        -.1493
                        6.000        -.1924
                        8.000        -.2397
                        9.000        -.2643
                        10.00        -.2885
                        12.00        -.3441
                        14.00        -.4383
                        16.00          .000
                        18.00          .000
                        20.00          .000
                        30.00          .000
                        40.00          .000
                        50.00          .000
                  </tableData>
               </table>
       </product>
    </function>

    <function name="aero/moment/Pitch_elevator">
       <description>Pitch moment due to elevator</description>
       <product>
          <property>aero/qbar-psf</property>
          <property>metrics/Sw-sqft</property>
          <property>metrics/cbarw-ft</property>
          <!--property>fcs/elevator-pos-rad</property>
          <table>
            <independentVar lookup="row">velocities/mach</independentVar>
            <tableData>
              0.0    -1.4019
              2.0    -0.3505
            </tableData>
          </table-->
               <table>
                  <independentVar lookup="row">fcs/elevator-pos-deg</independentVar>
                  <tableData>
                       -20.00         .3803
                       -15.00         .3527
                       -10.00         .2456
                       -5.000         .1228
                         .000        -.2456E-03
                        5.000        -.1228
                        10.00        -.2456
                        15.00        -.3527
                        20.00        -.3808
                  </tableData>
               </table>
       </product>
    </function>

    <function name="aero/moment/Pitch_damp">
       <description>Pitch moment due to pitch rate</description>
       <product>
           <property>aero/qbar-psf</property>
           <property>metrics/Sw-sqft</property>
           <property>metrics/cbarw-ft</property>
           <property>aero/ci2vel</property>
           <property>velocities/q-aero-rad_sec</property>
		   <!--value> -10.9333 </value-->
		   <value> 57.2958 </value>
		   <value> -0.3214 </value>
       </product>
    </function>

    <function name="aero/moment/Pitch_alphadot">
       <description>Pitch moment due to alpha rate</description>
       <product>
           <property>aero/qbar-psf</property>
           <property>metrics/Sw-sqft</property>
           <property>metrics/cbarw-ft</property>
           <property>aero/ci2vel</property>
           <!--property>aero/alphadot-rad_sec</property-->
		   <property>aero/alphadot-deg_sec</property>
           <!--value> -4.5842 </value-->
               <table>
                  <independentVar lookup="row">aero/alpha-deg</independentVar>
                  <tableData>
                       -16.00        -.1781
                       -8.000        -.1879
                       -6.000        -.1898
                       -4.000        -.1894
                       -2.000        -.1930
                         .000        -.1963
                        2.000        -.1965
                        4.000        -.1961
                        6.000        -.1924
                        8.000        -.1821
                        9.000        -.1678
                        10.00        -.1442
                        12.00        -.1061
                        14.00        -.7537E-01
                        16.00         .2588E-01
                        18.00         .2463
                        20.00         .3621
                        30.00         .1099
                        40.00        -.1258E-01
                        50.00        -.1470E-01
                  </tableData>
               </table>
       </product>
    </function>

         <function name="aero/moment/Pitch_CmDf2L">
            <description>
               Pitch moment coefficient due to left Single Slotted Flaps Deflection
               Positive surface deflection is trailing edge down
               Ultimately, we will feed this left flap pos
            </description>
            <product>
               <property>aero/qbar-psf</property>
               <property>metrics/Sw-sqft</property>
               <property>metrics/cbarw-ft</property>
               <table>
                  <independentVar lookup="row">fcs/flap-pos-deg</independentVar>
                  <tableData>
                         .000          .000
                        5.000        -.1191E-01
                        10.00        -.2376E-01
                        15.00        -.3507E-01
                        20.00        -.4600E-01
                        25.00        -.5540E-01
                        30.00        -.6315E-01
                        35.00        -.6898E-01
                  </tableData>
               </table>
            </product>
         </function>

         <function name="aero/moment/Pitch_CmDf2R">
            <description>
               Pitch moment coefficient due to right Single Slotted Flaps Deflection
               Positive surface deflection is trailing edge down
               Ultimately, we will feed this right flap pos
            </description>
            <product>
               <property>aero/qbar-psf</property>
               <property>metrics/Sw-sqft</property>
               <property>metrics/cbarw-ft</property>
               <table>
                  <independentVar lookup="row">fcs/flap-pos-deg</independentVar>
                  <tableData>
                         .000          .000
                        5.000        -.1191E-01
                        10.00        -.2376E-01
                        15.00        -.3507E-01
                        20.00        -.4600E-01
                        25.00        -.5540E-01
                        30.00        -.6315E-01
                        35.00        -.6898E-01
                  </tableData>
               </table>
            </product>
         </function>

         <function name="aero/moment/Pitch_Ail_CmDaL">
            <description>
               Pitch moment coefficient due to left Single Slotted Aileron Deflection
               Positive surface deflection is trailing edge down
               Ultimately, we will feed this left flap pos
            </description>
            <product>
               <property>aero/qbar-psf</property>
               <property>metrics/Sw-sqft</property>
               <property>metrics/cbarw-ft</property>
               <table>
                  <independentVar lookup="row">fcs/left-aileron-pos-deg</independentVar>
                  <tableData>
                       -12.00        -.1899E-01
                       -9.000        -.1419E-01
                       -6.000        -.9477E-02
                       -3.000        -.4747E-02
                         .000          .000
                        6.000         .9477E-02
                        12.00         .1877E-01
                        18.00         .2753E-01
                        24.00         .3551E-01
                  </tableData>
               </table>
            </product>
         </function>

         <function name="aero/moment/Pitch_Ail_CmDaR">
            <description>
               Pitch moment coefficient due to right Single Slotted Aileron Deflection
               Positive surface deflection is trailing edge down
               Ultimately, we will feed this right flap pos
            </description>
            <product>
               <property>aero/qbar-psf</property>
               <property>metrics/Sw-sqft</property>
               <property>metrics/cbarw-ft</property>
               <table>
                  <independentVar lookup="row">fcs/right-aileron-pos-deg</independentVar>
                  <tableData>
                       -12.00        -.1899E-01
                       -9.000        -.1419E-01
                       -6.000        -.9477E-02
                       -3.000        -.4747E-02
                         .000          .000
                        6.000         .9477E-02
                        12.00         .1877E-01
                        18.00         .2753E-01
                        24.00         .3551E-01
                  </tableData>
               </table>
            </product>
         </function>

  </axis>

  <axis name="ROLL">

    <function name="aero/moment/Roll_differential_propwash">
       <description>Roll moment due to differential propwash</description>
       <product>
           <property>propulsion/engine[0]/thrust-coefficient</property>
           <property>aero/qbar-psf</property>
           <property>metrics/Sw-sqft</property>
           <property>metrics/bw-ft</property>
           <property>aero/alpha-rad</property>
           <value> 0.1583 </value>
       </product>
    </function>

    <!--function name="aero/moment/Roll_beta">
       <description>Roll moment due to beta</description>
       <product>
           <property>aero/qbar-psf</property>
           <property>metrics/Sw-sqft</property>
           <property>metrics/bw-ft</property>
           <property>aero/beta-rad</property>
           <property>fcs/gear-no-wow</property>
           <table>
             <independentVar lookup="row">aero/alpha-rad</independentVar>
             <independentVar lookup="column">aero/Re</independentVar>
             <tableData>
                          2265572  2492129  3398358  4531514
                 -0.0349  -0.5931  -0.1696  -0.1470  -0.1391
                  0.3491  -0.6716  -0.1793  -0.1568  -0.1491
             </tableData>
           </table>
       </product>
    </function-->

         <function name="aero/moment/Roll_beta_Clb">
            <description>
               Roll Moment coefficient due to Beta(per degree)
               Decrease of Clb to small negative value improves Dutch Roll Damping
               High Positive value leads to excessive spiral instability
            </description>
            <product>
               <property>aero/qbar-psf</property>
               <property>metrics/Sw-sqft</property>
               <property>metrics/bw-ft</property>
               <property>aero/beta-deg</property>
			   <property>fcs/gear-no-wow</property>
               <table>
                  <independentVar lookup="row">aero/alpha-deg</independentVar>
                  <tableData>
                       -16.00        -.8474E-03
                       -8.000        -.1028E-02
                       -6.000        -.1070E-02
                       -4.000        -.1107E-02
                       -2.000        -.1141E-02
                         .000        -.1176E-02
                        2.000        -.1216E-02
                        4.000        -.1259E-02
                        6.000        -.1305E-02
                        8.000        -.1355E-02
                        9.000        -.1377E-02
                        10.00        -.1393E-02
                        12.00        -.1413E-02
                        14.00        -.1416E-02
                        16.00        -.1397E-02
                        18.00        -.1293E-02
                        20.00        -.8712E-03
                        30.00         .4183E-03
                        40.00         .8653E-03
                        50.00         .9904E-03
                  </tableData>
               </table>
            </product>
         </function>

    <!--function name="aero/moment/Roll_damp">
       <description>Roll moment due to roll rate</description>
       <product>
           <property>aero/qbar-psf</property>
           <property>metrics/Sw-sqft</property>
           <property>metrics/bw-ft</property>
           <property>aero/bi2vel</property>
           <property>velocities/p-aero-rad_sec</property>
           <value> -0.6911 </value>
       </product>
    </function-->

         <function name="aero/moment/Roll_damp_Clp">
            <description>
               Roll Moment coefficient due to roll rate(per degree)
               Clp alone determines damping-in-roll characteristics
            </description>
            <product>
               <property>aero/qbar-psf</property>
               <property>metrics/Sw-sqft</property>
               <property>metrics/bw-ft</property>
               <property>aero/bi2vel</property>
               <property>velocities/p-aero-rad_sec</property>
			   <value>57.29577951</value>
               <table>
                  <independentVar lookup="row">aero/alpha-deg</independentVar>
                  <tableData>
                       -16.00        -.3152E-01
                       -8.000        -.3033E-01
                       -6.000        -.2958E-01
                       -4.000        -.2849E-01
                       -2.000        -.2866E-01
                         .000        -.3000E-01
                        2.000        -.3126E-01
                        4.000        -.3225E-01
                        6.000        -.3296E-01
                        8.000        -.3192E-01
                        9.000        -.2892E-01
                        10.00        -.2549E-01
                        12.00        -.2063E-01
                        14.00        -.1452E-01
                        16.00         .3414E-02
                        18.00         .7200E-01
                        20.00         .1153
                        30.00         .3600E-01
                        40.00         .7547E-03
                        50.00        -.1951E-01
                  </tableData>
               </table>
            </product>
         </function>

    <!--function name="aero/moment/Roll_yaw">
       <description>Roll moment due to yaw rate</description>
       <product>
           <property>aero/qbar-psf</property>
           <property>metrics/Sw-sqft</property>
           <property>metrics/bw-ft</property>
           <property>aero/bi2vel</property>
           <property>velocities/r-aero-rad_sec</property>
           <table>
             <independentVar lookup="row">aero/alpha-rad</independentVar>
             <independentVar lookup="column">aero/Re</independentVar>
             <tableData>
                          2265572  2492129  3398358  4531514
                 -0.0349   0.0303   0.0303   0.0303   0.0303
                  0.3491   4.1747   0.5422   0.5422   0.5422
             </tableData>
           </table>
       </product>
    </function-->

         <function name="aero/moment/Roll_yaw_Clr">
            <description>
               Roll Moment coefficient due to yaw rate(per degree)
               Considerable effect on Spiral mode. Large
               positive values leads to strong sprial instability.
            </description>
            <product>
               <property>aero/qbar-psf</property>
               <property>metrics/Sw-sqft</property>
               <property>metrics/bw-ft</property>
               <property>aero/bi2vel</property>
               <property>velocities/r-aero-rad_sec</property>
			   <value>57.29577951</value>
               <table>
                  <independentVar lookup="row">aero/alpha-deg</independentVar>
                  <tableData>
                       -16.00        -.3201E-02
                       -8.000        -.8603E-03
                       -6.000        -.2950E-03
                       -4.000         .2440E-03
                       -2.000         .7617E-03
                         .000         .1304E-02
                        2.000         .1871E-02
                        4.000         .2460E-02
                        6.000         .3065E-02
                        8.000         .3679E-02
                        9.000         .3966E-02
                        10.00         .4205E-02
                        12.00         .4617E-02
                        14.00         .4922E-02
                        16.00         .5088E-02
                        18.00         .4672E-02
                        20.00         .2088E-02
                        30.00        -.4307E-02
                        40.00        -.5652E-02
                        50.00        -.4923E-02
                  </tableData>
               </table>
            </product>
         </function>

    <!--function name="aero/moment/Roll_aileron">
       <description>Roll moment due to aileron</description>
       <product>
          <property>aero/qbar-psf</property>
          <property>metrics/Sw-sqft</property>
          <property>metrics/bw-ft</property>
          <property>fcs/left-aileron-pos-rad</property>
           <table>
            <independentVar lookup="row">velocities/mach</independentVar>
            <tableData>
              0.0    0.1800
              2.0    0.0450
            </tableData>
          </table>
       </product>
    </function-->

         <!--function name="aero/moment/Roll_aileron_ClDa">
            <description>
               Roll Moment coefficient due to Left Double Slotted Flaps Deflection
            </description>
            <product>
               <property>aero/qbar-psf</property>
               <property>metrics/Sw-sqft</property>
               <property>metrics/bw-ft</property>
               <table>
                  <independentVar lookup="row">aero/function/ailerons-pos-sum-deg</independentVar>
                  <tableData>
                       -36.00        -.6076E-01
                       -27.00        -.5270E-01
                       -18.00        -.3656E-01
                       -9.000        -.1836E-01
                         .000          .000
                        9.000         .1836E-01
                        18.00         .3656E-01
                        27.00         .5270E-01
                        36.00         .6076E-01
                  </tableData>
               </table>
            </product>
         </function-->

         <function name="aero/moment/Roll_aileron_ClDa">
            <description>
               Roll Moment Coefficient due to Asymetrical Single Slotted Flaps Deflection
               calculated as difference between left and right flap lift coef,
               times distance from centerline to MAC of surface.
            </description>
            <product>
               <value>      9.13</value>
               <difference>
                  <property>aero/force/Lift_Ail_CLdaR</property>
                  <property>aero/force/Lift_Ail_CLdaL</property>
               </difference>
            </product>
         </function>

         <function name="aero/moment/Roll_AsymFlpDeflec_CldF2">
            <description>
               Roll Moment Coefficient due to Asymetrical Single Slotted Flaps Deflection
               calculated as difference between left and right flap lift coef,
               times distance from centerline to MAC of surface.
            </description>
            <product>
               <value>      4.17</value>
               <difference>
                  <property>aero/force/Lift_Flap_CLdF2R</property>
                  <property>aero/force/Lift_Flap_CLdF2L</property>
               </difference>
            </product>
         </function>

    <function name="aero/moment/Roll_rudder">
       <description>Roll moment due to rudder</description>
       <product>
           <property>aero/qbar-psf</property>
           <property>metrics/Sw-sqft</property>
           <property>metrics/bw-ft</property>
           <property>fcs/rudder-pos-rad</property>
           <value> 0.0100 </value>
       </product>
    </function>

  </axis>

  <axis name="YAW">

    <!-- Stall initiator -->
    <function name="aero/moment/Yaw_alpha">
       <description>Yaw moment due to alpha</description>
       <product>
           <property>aero/qbar-psf</property>
           <property>metrics/Sw-sqft</property>
           <property>metrics/bw-ft</property>
           <property>aero/alpha-rad</property>
           <property>fcs/gear-no-wow</property>
           <table>
             <independentVar lookup="row">aero/beta-rad</independentVar>
             <independentVar lookup="column">aero/Re</independentVar>
             <tableData>
                          2265572  2492129
                 -0.3491  -1.0000   0.0000
                  0.3491   1.0000   0.0000
             </tableData>
           </table>
       </product>
    </function>

    <!--function name="aero/moment/Yaw_beta">
       <description>Yaw moment due to beta</description>
       <product>
           <property>aero/qbar-psf</property>
           <property>metrics/Sw-sqft</property>
           <property>metrics/bw-ft</property>
           <property>aero/beta-rad</property>
           <value> 0.1046 </value>
       </product>
    </function-->

         <function name="aero/moment/Yaw_beta_Cnb">
            <description>
               Yaw moment coefficient due to sideslip(per degree)
               Determines Dutch Roll and Spiral characteristics
               Prevents side-slip and yawing moments
            </description>
            <product>
               <property>aero/qbar-psf</property>
               <property>metrics/Sw-sqft</property>
               <property>metrics/bw-ft</property>
               <property>aero/beta-deg</property>
               <table>
                  <independentVar lookup="row">aero/alpha-deg</independentVar>
                  <tableData>
                       -16.00         .1353E-02
                       -8.000         .1353E-02
                       -6.000         .1353E-02
                       -4.000         .1353E-02
                       -2.000         .1353E-02
                         .000         .1353E-02
                        2.000         .1353E-02
                        4.000         .1353E-02
                        6.000         .1353E-02
                        8.000         .1353E-02
                        9.000         .1353E-02
                        10.00         .1353E-02
                        12.00         .1353E-02
                        14.00         .1353E-02
                        16.00         .1353E-02
                        18.00         .1353E-02
                        20.00         .1353E-02
                        30.00         .1353E-02
                        40.00         .1353E-02
                        50.00         .1353E-02
                  </tableData>
               </table>
            </product>
         </function>

    <!--function name="aero/moment/Yaw_roll_rate">
       <description>Yaw moment due to roll rate</description>
       <product>
           <property>aero/qbar-psf</property>
           <property>metrics/Sw-sqft</property>
           <property>metrics/bw-ft</property>
           <property>aero/bi2vel</property>
           <property>velocities/p-rad_sec</property>
           <table>
             <independentVar lookup="row">aero/Re</independentVar>
             <tableData>
                 2265572  -0.1311
                 2492129  -0.0115
                 3398358  -0.0051
                 4531514  -0.0029
             </tableData>
           </table>
       </product>
    </function-->

         <function name="aero/moment/Yaw_roll_rate_Cnp">
            <description>
               Yaw moment coefficient due to roll rate(per degree)
               Reduces Dutch Roll damping
               positive value desireable
            </description>
            <product>
               <property>aero/qbar-psf</property>
               <property>metrics/Sw-sqft</property>
               <property>metrics/bw-ft</property>
               <property>aero/bi2vel</property>
               <property>velocities/p-aero-rad_sec</property>
			   <value>57.29577951</value>
               <table>
                  <independentVar lookup="row">aero/alpha-deg</independentVar>
                  <tableData>
                       -16.00        -.5499E-03
                       -8.000        -.5075E-03
                       -6.000        -.1703E-03
                       -4.000         .3955E-04
                       -2.000         .9753E-04
                         .000         .2655E-04
                        2.000        -.1880E-03
                        4.000        -.6085E-03
                        6.000        -.1404E-02
                        8.000        -.2232E-02
                        9.000        -.1905E-02
                        10.00        -.2249E-02
                        12.00        -.2625E-02
                        14.00        -.2780E-02
                        16.00        -.2648E-02
                        18.00        -.6225E-02
                        20.00        -.7467E-02
                        30.00         .1884E-02
                        40.00         .1111E-02
                        50.00         .6331E-04
                  </tableData>
               </table>
            </product>
         </function>

    <!--function name="aero/moment/Yaw_damp">
       <description>Yaw moment due to yaw rate</description>
       <product>
           <property>aero/qbar-psf</property>
           <property>metrics/Sw-sqft</property>
           <property>metrics/bw-ft</property>
           <property>aero/bi2vel</property>
           <property>velocities/r-aero-rad_sec</property>
           <value> -0.1032 </value>
       </product>
    </function-->

         <function name="aero/moment/Yaw_damp_Cnr">
            <description>
               Yaw Moment coefficient due to yaw rate(per degree)
               Main contributor to damping of Dutch Roll
            </description>
            <product>
               <property>aero/qbar-psf</property>
               <property>metrics/Sw-sqft</property>
               <property>metrics/bw-ft</property>
               <property>aero/bi2vel</property>
               <property>velocities/r-aero-rad_sec</property>
			   <value>57.29577951</value>
               <table>
                  <independentVar lookup="row">aero/alpha-deg</independentVar>
                  <tableData>
                       -16.00        -.1985E-02
                       -8.000        -.1912E-02
                       -6.000        -.1924E-02
                       -4.000        -.1946E-02
                       -2.000        -.1978E-02
                         .000        -.2019E-02
                        2.000        -.2071E-02
                        4.000        -.2135E-02
                        6.000        -.2213E-02
                        8.000        -.2306E-02
                        9.000        -.2354E-02
                        10.00        -.2397E-02
                        12.00        -.2476E-02
                        14.00        -.2538E-02
                        16.00        -.2571E-02
                        18.00        -.2484E-02
                        20.00        -.2108E-02
                        30.00        -.2138E-02
                        40.00        -.2076E-02
                        50.00        -.1595E-02
                  </tableData>
               </table>
            </product>
         </function>

         <!-- ******************************************************
              CnDr is not calculated by DATCOM+, but a value from
               Aeromatic c++ 3.3 is supplied
              ******************************************************-->

    <function name="aero/moment/Yaw_rudder_CnDr">
       <description>Yaw moment due to rudder</description>
       <product>
           <property>aero/qbar-psf</property>
           <property>metrics/Sw-sqft</property>
           <property>metrics/bw-ft</property>
           <property>fcs/rudder-pos-rad</property>
           <value> -0.0657 </value>
       </product>
    </function>

    <!--function name="aero/moment/Yaw_aileron">
       <description>Adverse yaw</description>
       <product>
           <property>aero/qbar-psf</property>
           <property>metrics/Sw-sqft</property>
           <property>metrics/bw-ft</property>
           <property>fcs/left-aileron-pos-rad</property>
           <value> -0.0030 </value>
       </product>
    </function-->

         <!--function name="aero/moment/Yaw_aileron_CnDa">
            <description>
               Yaw Moment coefficient due to plain flap aileron deflection
            </description>
            <product>
               <property>aero/qbar-psf</property>
               <property>metrics/Sw-sqft</property>
               <property>metrics/bw-ft</property>
			   <value> 0.5 </value>
               <table>
                  <independentVar lookup="row">aero/alpha-deg</independentVar>
				  <independentVar lookup="column">aero/function/ailerons-pos-sum-deg</independentVar>
                  <tableData>
                                     -36.00        -27.00        -18.00        -9.000          .000         9.000         18.00         27.00         36.00
                       -16.00        -.8072E-02    -.7002E-02    -.4858E-02    -.2439E-02      .000         .2439E-02     .4858E-02     .7002E-02     .8072E-02
                       -8.000        -.2969E-02    -.2575E-02    -.1787E-02    -.8969E-03      .000         .8969E-03     .1787E-02     .2575E-02     .2969E-02
                       -6.000        -.1718E-02    -.1490E-02    -.1034E-02    -.5192E-03      .000         .5192E-03     .1034E-02     .1490E-02     .1718E-02
                       -4.000        -.5169E-03    -.4483E-03    -.3111E-03    -.1562E-03      .000         .1562E-03     .3111E-03     .4483E-03     .5169E-03
                       -2.000         .6459E-03     .5603E-03     .3887E-03     .1951E-03      .000        -.1951E-03    -.3887E-03    -.5603E-03    -.6459E-03
                         .000         .1863E-02     .1616E-02     .1121E-02     .5628E-03      .000        -.5628E-03    -.1121E-02    -.1616E-02    -.1863E-02
                        2.000         .3137E-02     .2721E-02     .1888E-02     .9478E-03      .000        -.9478E-03    -.1888E-02    -.2721E-02    -.3137E-02
                        4.000         .4458E-02     .3867E-02     .2683E-02     .1347E-02      .000        -.1347E-02    -.2683E-02    -.3867E-02    -.4458E-02
                        6.000         .5814E-02     .5043E-02     .3499E-02     .1756E-02      .000        -.1756E-02    -.3499E-02    -.5043E-02    -.5814E-02
                        8.000         .7192E-02     .6239E-02     .4329E-02     .2173E-02      .000        -.2173E-02    -.4329E-02    -.6239E-02    -.7192E-02
                        9.000         .7840E-02     .6800E-02     .4718E-02     .2369E-02      .000        -.2369E-02    -.4718E-02    -.6800E-02    -.7840E-02
                        10.00         .8391E-02     .7279E-02     .5050E-02     .2535E-02      .000        -.2535E-02    -.5050E-02    -.7279E-02    -.8391E-02
                        12.00         .9357E-02     .8117E-02     .5632E-02     .2827E-02      .000        -.2827E-02    -.5632E-02    -.8117E-02    -.9357E-02
                        14.00         .1010E-01     .8763E-02     .6080E-02     .3052E-02      .000        -.3052E-02    -.6080E-02    -.8763E-02    -.1010E-01
                        16.00         .1056E-01     .9161E-02     .6356E-02     .3191E-02      .000        -.3191E-02    -.6356E-02    -.9161E-02    -.1056E-01
                        18.00         .9825E-02     .8522E-02     .5913E-02     .2968E-02      .000        -.2968E-02    -.5913E-02    -.8522E-02    -.9825E-02
                        20.00         .4623E-02     .4010E-02     .2783E-02     .1397E-02      .000        -.1397E-02    -.2783E-02    -.4010E-02    -.4623E-02
                        30.00        -.7989E-02    -.6929E-02    -.4808E-02    -.2414E-02      .000         .2414E-02     .4808E-02     .6929E-02     .7989E-02
                        40.00        -.1032E-01    -.8948E-02    -.6208E-02    -.3117E-02      .000         .3117E-02     .6208E-02     .8948E-02     .1032E-01
                        50.00        -.8534E-02    -.7402E-02    -.5136E-02    -.2578E-02      .000         .2578E-02     .5136E-02     .7402E-02     .8534E-02
                  </tableData>
               </table>
            </product>
         </function-->

         <function name="aero/moment/Yaw_aileron_CnDa">
            <description>
               Yaw Moment Coefficient due to Asymetrical Single Slotted Flaps Deflection
               calculated as difference between left and right flap drag coef,
               times distance from centerline to MAC of surface.
            </description>
            <product>
               <value>      9.13</value>
               <difference>
                  <property>aero/force/Drag_Ail_CdDaR</property>
                  <property>aero/force/Drag_Ail_CdDaL</property>
               </difference>
            </product>
         </function>

         <function name="aero/moment/Yaw_AymFlpDeflec_CnDf2">
            <description>
               Yaw Moment Coefficient due to Asymetrical Single Slotted Flaps Deflection
               calculated as difference between left and right flap drag coef,
               times distance from centerline to MAC of surface.
            </description>
            <product>
               <value>      4.17</value>
               <difference>
                  <property>aero/force/Drag_Flap_CdDf2R</property>
                  <property>aero/force/Drag_Flap_CdDf2L</property>
               </difference>
            </product>
         </function>

  </axis>

 </aerodynamics>

 <external_reactions>
 </external_reactions>

</fdm_config>
