<?xml version="1.0"?>

<!-- ProMecc Freccia JSBsim -->
<!-- Copyright (c) 2021 Salvatore De Astis (sdeastis) -->

 <aerodynamics>

       <alphalimits unit="DEG">
         <min>  -5.00  </min>
         <max>  16.00  </max>
      </alphalimits>

      <hysteresis_limits unit="DEG">
          <min>  8.0  </min>
          <max>  17  </max>
      </hysteresis_limits>

      <!-- *************************
                Sign Conventions
           *************************

           Control displacements
                Stick    FWD  + / Aft -
                Stick    Left + / Right -
                Wheel    CCW  + / CW -
                Pedal    Left + / Right -
                Elevator trim Nose Up + / Nose down -

           Surfaces
                Elevator  TED + / TEU -
                R Ail     TED + / TEU -
                L Ail     TED + / TEU -
                Rudder    TEL + / TER -

           F&M, Accel, Rates, Displacements
                Pitch     Up  + / Down -
                Roll      Rgt + / Left -
                Yaw       Rgt + / Left -

           Other
                Alpha     Up  + / Down -
                Beta Wind in right ear + / Wind in left ear -
                Slip Ball right of center + / left of center -
      -->


      <!-- **************************************
                ASSUMPTIONS AND LIMITATIONS

           There is no interaction between deflected surfaces modeled
           so there is no change in elevator effects with the flaps
           deflected, for example.

           Terms known to be missing from DATCOM:
              Power effects
              Ground effects
              Cyr, CyDr, Cyda, ClDr, Cndr

           **************************************
      -->


      <!--
           The following ground effect tables are NOT generated
           by DATCOM, but provide representative effects.
           These terms are not currently used in this model.
      -->

	<function name="aero/function/ground-effect-factor-lift">
		<description>Change in lift due to ground effect factor</description>
         <product>
            <table>
               <independentVar lookup="row">aero/h_b-mac-ft</independentVar>
               <tableData>
                  0.0  1.203
                  0.1  1.127
                  0.15 1.090
                  0.2  1.073
                  0.3  1.046
                  0.4  1.055
                  0.5  1.019
                  0.6  1.013
                  0.7  1.008
                  0.8  1.006
                  0.9  1.003
                  1.0  1.002
                  1.1  1.0
               </tableData>
            </table>
         </product>
	</function>

	<function name="aero/function/ground-effect-factor-drag">
		<description>Change in drag due to ground effect</description>
         <product>
            <table>
               <independentVar lookup="row">aero/h_b-mac-ft</independentVar>
               <tableData>
                  0.0  0.480
                  0.1  0.515
                  0.15 0.629
                  0.2  0.709
                  0.3  0.815
                  0.4  0.882
                  0.5  0.928
                  0.6  0.962
                  0.7  0.988
                  0.8  1.0
                  0.9  1.0
                  1.0  1.0
                  1.1  1.0
               </tableData>
            </table>
         </product>
	</function>

	<function name="aero/function/ailerons-pos-sum-deg">
		<description>Add the two aileron, required for Roll axis</description>
		<sum>
			<property>fcs/left-aileron-pos-deg</property>
			<property>-fcs/right-aileron-pos-deg</property>
		</sum>
	</function>

  <axis name="LIFT">

         <function name="aero/coefficient/CLwbh">
            <description>
               Lift due to alpha
               Increase in CL decreases Period and damping,Dutch Roll damping
               CL is low for landing
            </description>
            <product>
               <property>aero/function/ground-effect-factor-lift</property>
               <property>aero/qbar-psf</property>
               <property>metrics/Sw-sqft</property>
               <table>
                  <independentVar lookup="row">aero/alpha-deg</independentVar>
                  <tableData>
                       -5.000       -0.2403
                       -2.500        0.1981E-01
                       -1.000        0.1780
                        0.000        0.2863
                        1.000        0.3969
                        2.500        0.5668
                        5.000        0.8582
                        6.000        0.9777
                        8.000        1.223
                        10.00        1.442
                        12.00        1.630
                        15.00        1.869
                        20.00        1.128
                        30.00       -1.021
                        40.00       -1.319
                        50.00       -0.9486
                        60.00       -0.4168
                        70.00        0.6458E-01
                        80.00        0.1377
                        90.00       -0.4165E+06
                  </tableData>
               </table>
            </product>
         </function>

         <function name="aero/coefficient/CLdFlpL">
            <description>
               Lift Coefficient due to Left Single Slotted Flaps Deflection
               Positive surface deflection is trailing edge down
               Ultimately, we will feed this left flap pos
            </description>
            <product>
               <property>aero/qbar-psf</property>
               <property>metrics/Sw-sqft</property>
               <table>
                  <independentVar lookup="row">fcs/flap-pos-deg</independentVar>
                  <tableData>
                        0.000         0.000
                        5.000         0.2890E-01
                        10.00         0.5757E-01
                        15.00         0.8479E-01
                        20.00         0.1110
                        25.00         0.1334
                        30.00         0.1518
                        35.00         0.1654
                  </tableData>
               </table>
            </product>
         </function>

         <function name="aero/coefficient/CLdFlpR">
            <description>
               Lift Coefficient due to Right Single Slotted Flaps Deflection
               Positive surface deflection is trailing edge down
               Ultimately, we will feed this right flap pos
            </description>
            <product>
               <property>aero/qbar-psf</property>
               <property>metrics/Sw-sqft</property>
               <table>
                  <independentVar lookup="row">fcs/flap-pos-deg</independentVar>
                  <tableData>
                        0.000          0.000
                        5.000         0.2890E-01
                        10.00         0.5757E-01
                        15.00         0.8479E-01
                        20.00         0.1110
                        25.00         0.1334
                        30.00         0.1518
                        35.00         0.1654
                  </tableData>
               </table>
            </product>
         </function>

<!--         <function name="aero/coefficient/CLdAilL">
            <description>
               Lift Coefficient due to Left Plain Flaps Deflection
               Positive surface deflection is trailing edge down
               Ultimately, we will feed this left flap pos
            </description>
            <product>
               <property>aero/qbar-psf</property>
               <property>metrics/Sw-sqft</property>
               <table>
                  <independentVar lookup="row">fcs/left-aileron-pos-deg</independentVar>
                  <tableData>
                       -15.00        -0.6592E-01
                       -10.00        -0.4591E-01
                       -5.000        -0.2296E-01
                       -2.500        -0.1148E-01
                        0.000         0.000
                        5.000         0.2296E-01
                        10.00         0.4591E-01
                        15.00         0.6592E-01
                        20.00         0.7054E-01
                  </tableData>
               </table>
            </product>
         </function>
-->
<!--         <function name="aero/coefficient/CLdAilR">
            <description>
               Lift Coefficient due to Right Plain Flaps Deflection
               Positive surface deflection is trailing edge down
               Ultimately, we will feed this right flap pos
            </description>
            <product>
               <property>aero/qbar-psf</property>
               <property>metrics/Sw-sqft</property>
               <table>
                  <independentVar lookup="row">fcs/right-aileron-pos-deg</independentVar>
                  <tableData>
                       -15.00        -0.6592E-01
                       -10.00        -0.4591E-01
                       -5.000        -0.2296E-01
                       -2.500        -0.1148E-01
                        0.000         0.000
                        5.000         0.2296E-01
                        10.00         0.4591E-01
                        15.00         0.6592E-01
                        20.00         0.7054E-01
                  </tableData>
               </table>
            </product>
         </function>
-->

         <function name="aero/coefficient/CLDe">
            <description>
               Lift Coefficient due to Elevator Deflection
               Positive surface deflection is trailing edge down
            </description>
            <product>
               <property>aero/qbar-psf</property>
               <property>metrics/Sw-sqft</property>
               <table>
                  <independentVar lookup="row">fcs/elevator-pos-deg</independentVar>
                  <tableData>
                       -15.00        -0.1318
                       -10.00        -0.9183E-01
                       -5.000        -0.4591E-01
                       -2.500        -0.2296E-01
                        0.000         0.9183E-04
                        5.000         0.4591E-01
                        10.00         0.9183E-01
                        15.00         0.1318
                        20.00         0.1411
                  </tableData>
               </table>
            </product>
         </function>

         <function name="aero/coefficient/CLad">
            <description>
               Basic Lift Coefficient due to AOA rate(per degree)
               Important contributor to Short-Period damping
               For low Cla, aircraft must land at high alpha
            </description>
            <product>
               <property>aero/alphadot-deg_sec</property>
               <property>aero/qbar-psf</property>
               <property>metrics/Sw-sqft</property>
               <property>aero/ci2vel</property>
               <table>
                  <independentVar lookup="row">aero/alpha-deg</independentVar>
                  <tableData>
                       -5.000         0.6248E-01
                       -2.500         0.6397E-01
                       -1.000         0.6512E-01
                        0.000         0.6539E-01
                        1.000         0.6500E-01
                        2.500         0.6467E-01
                        5.000         0.6498E-01
                        6.000         0.6404E-01
                        8.000         0.5902E-01
                        10.00         0.4811E-01
                        12.00         0.3315E-01
                        15.00        -0.9033E-02
                        20.00        -0.6654E-01
                        30.00        -0.3552E-01
                        40.00         0.2346E-02
                        50.00         0.2263E-02
                        60.00        -0.4359E-03
                        70.00        -0.4359E-03
                        80.00        -0.4359E-03
                        90.00        -0.4359E-03
                  </tableData>
               </table>
            </product>
         </function>

         <function name="aero/coefficient/CLq">
            <description>
               Basic Lift Coefficient due to pitch rate(per degree)
            </description>
            <product>
               <property>velocities/q-aero-rad_sec</property>
               <value>57.29577951</value>
               <property>aero/qbar-psf</property>
               <property>metrics/Sw-sqft</property>
               <property>aero/ci2vel</property>
               <table>
                  <independentVar lookup="row">aero/alpha-deg</independentVar>
                  <tableData>
                       -5.000         0.1697
                       -2.500         0.1697
                       -1.000         0.1697
                        0.000         0.1697
                        1.000         0.1697
                        2.500         0.1697
                        5.000         0.1697
                        6.000         0.1697
                        8.000         0.1697
                        10.00         0.1697
                        12.00         0.1697
                        15.00         0.1697
                        20.00         0.1697
                        30.00         0.1697
                        40.00         0.1697
                        50.00         0.1697
                        60.00         0.1697
                        70.00         0.1697
                        80.00         0.1697
                        90.00         0.1697
                  </tableData>
               </table>
            </product>
         </function>

  </axis>

  <axis name="DRAG">

         <function name="aero/coefficient/CD">
            <description>
               Basic Drag Coefficient
               Sense: Always positive
               Main contributor to Phugoid damping: Greater Cd, Better damping
            </description>
            <product>
               <property>aero/function/ground-effect-factor-lift</property>
               <property>aero/qbar-psf</property>
               <property>metrics/Sw-sqft</property>
               <table>
                  <independentVar lookup="row">aero/alpha-deg</independentVar>
                  <tableData>
                       -5.000        0.2241E-01
                       -2.500        0.1871E-01
                       -1.000        0.1957E-01
                        0.000        0.2156E-01
                        1.000        0.2467E-01
                        2.500        0.3162E-01
                        5.000        0.4964E-01
                        6.000        0.5923E-01
                        8.000        0.8300E-01
                        10.00        0.1093
                        12.00        0.1365
                        15.00        0.1797
                        20.00        0.1401
                        30.00        0.2597
                        40.00        0.5064
                        50.00        0.7335
                        60.00        0.9756
                        70.00         1.216
                        80.00         1.405
                        90.00         1.481
                  </tableData>
               </table>
            </product>
         </function>

<!--         <function name="aero/coefficient/CdDAilL">
            <description>
               Drag Coefficient due to Left Plain Flaps Deflection
               Positive surface deflection is trailing edge down
               Ultimately, we will feed this left flap pos
            </description>
            <product>
               <property>aero/qbar-psf</property>
               <property>metrics/Sw-sqft</property>
               <table>
                  <independentVar lookup="row">aero/alpha-deg</independentVar>
                  <independentVar lookup="column">fcs/left-aileron-pos-deg</independentVar>
                  <tableData>
                                     -15.00        -10.00        -5.000        -2.500         0.000         5.000         10.00         15.00         20.00
                       -5.000        0.2346E-02    0.1093E-02    0.2369E-03    0.4111E-04     0.000        0.3820E-03    0.1383E-02    0.2762E-02    0.3150E-02
                       -2.500        0.1731E-02    0.6648E-03    0.2294E-04   -0.6589E-04     0.000        0.5960E-03    0.1811E-02    0.3377E-02    0.3808E-02
                       -1.000        0.1380E-02    0.4206E-03   -0.9914E-04   -0.1269E-03     0.000        0.7181E-03    0.2055E-02    0.3728E-02    0.4183E-02
                        0.000        0.1149E-02    0.2594E-03   -0.1797E-03   -0.1672E-03     0.000        0.7987E-03    0.2216E-02    0.3959E-02    0.4431E-02
                        1.000        0.9180E-03    0.9886E-04   -0.2600E-03   -0.2074E-03     0.000        0.8790E-03    0.2377E-02    0.4190E-02    0.4678E-02
                        2.500        0.5629E-03   -0.1483E-03   -0.3836E-03   -0.2692E-03     0.000        0.1003E-02    0.2624E-02    0.4545E-02    0.5058E-02
                        5.000       -0.1597E-04   -0.5513E-03   -0.5851E-03   -0.3699E-03     0.000        0.1204E-02    0.3027E-02    0.5124E-02    0.5678E-02
                        6.000       -0.2498E-03   -0.7141E-03   -0.6665E-03   -0.4106E-03     0.000        0.1285E-02    0.3190E-02    0.5358E-02    0.5928E-02
                        8.000       -0.7423E-03   -0.1057E-02   -0.8380E-03   -0.4963E-03     0.000        0.1457E-02    0.3533E-02    0.5850E-02    0.6455E-02
                        10.00       -0.1304E-02   -0.1448E-02   -0.1033E-02   -0.5941E-03     0.000        0.1652E-02    0.3924E-02    0.6412E-02    0.7056E-02
                        12.00       -0.1984E-02   -0.1921E-02   -0.1270E-02   -0.7124E-03     0.000        0.1889E-02    0.4397E-02    0.7092E-02    0.7784E-02
                        15.00       -0.3304E-02   -0.2840E-02   -0.1729E-02   -0.9421E-03     0.000        0.2348E-02    0.5316E-02    0.8412E-02    0.9197E-02
                        20.00       -0.7766E-02   -0.5947E-02   -0.3283E-02   -0.1719E-02     0.000        0.3902E-02    0.8423E-02    0.1287E-01    0.1397E-01
                        30.00       -0.1698E-01   -0.1236E-01   -0.6490E-02   -0.3323E-02     0.000        0.7109E-02    0.1484E-01    0.2209E-01    0.2384E-01
                        40.00       -0.2265E-01   -0.1631E-01   -0.8465E-02   -0.4310E-02     0.000        0.9084E-02    0.1879E-01    0.2776E-01    0.2991E-01
                        50.00       -0.2802E-01   -0.2004E-01   -0.1033E-01   -0.5243E-02     0.000        0.1095E-01    0.2252E-01    0.3312E-01    0.3565E-01
                        60.00       -0.3370E-01   -0.2400E-01   -0.1231E-01   -0.6232E-02     0.000        0.1293E-01    0.2648E-01    0.3881E-01    0.4173E-01
                        70.00       -0.3933E-01   -0.2792E-01   -0.1427E-01   -0.7213E-02     0.000        0.1489E-01    0.3040E-01    0.4444E-01    0.4777E-01
                        80.00       -0.4497E-01   -0.3185E-01   -0.1623E-01   -0.8194E-02     0.000        0.1685E-01    0.3432E-01    0.5008E-01    0.5380E-01
                        90.00       -0.5061E-01   -0.3577E-01   -0.1820E-01   -0.9175E-02     0.000        0.1882E-01    0.3825E-01    0.5572E-01    0.5984E-01
                  </tableData>
               </table>
            </product>
         </function>
-->
<!--         <function name="aero/coefficient/CdDAilR">
            <description>
               Drag Coefficient due to Right Plain Flaps Deflection
               Positive surface deflection is trailing edge down
               Ultimately, we will feed this right flap pos
            </description>
            <product>
               <property>aero/qbar-psf</property>
               <property>metrics/Sw-sqft</property>
               <table>
                  <independentVar lookup="row">aero/alpha-deg</independentVar>
                  <independentVar lookup="column">fcs/right-aileron-pos-deg</independentVar>
                  <tableData>
                                     -15.00        -10.00        -5.000        -2.500         0.000         5.000         10.00         15.00         20.00
                       -5.000        0.2346E-02    0.1093E-02    0.2369E-03    0.4111E-04     0.000        0.3820E-03    0.1383E-02    0.2762E-02    0.3150E-02
                       -2.500        0.1731E-02    0.6648E-03    0.2294E-04   -0.6589E-04     0.000        0.5960E-03    0.1811E-02    0.3377E-02    0.3808E-02
                       -1.000        0.1380E-02    0.4206E-03   -0.9914E-04   -0.1269E-03     0.000        0.7181E-03    0.2055E-02    0.3728E-02    0.4183E-02
                        0.000        0.1149E-02    0.2594E-03   -0.1797E-03   -0.1672E-03     0.000        0.7987E-03    0.2216E-02    0.3959E-02    0.4431E-02
                        1.000        0.9180E-03    0.9886E-04   -0.2600E-03   -0.2074E-03     0.000        0.8790E-03    0.2377E-02    0.4190E-02    0.4678E-02
                        2.500        0.5629E-03   -0.1483E-03   -0.3836E-03   -0.2692E-03     0.000        0.1003E-02    0.2624E-02    0.4545E-02    0.5058E-02
                        5.000       -0.1597E-04   -0.5513E-03   -0.5851E-03   -0.3699E-03     0.000        0.1204E-02    0.3027E-02    0.5124E-02    0.5678E-02
                        6.000       -0.2498E-03   -0.7141E-03   -0.6665E-03   -0.4106E-03     0.000        0.1285E-02    0.3190E-02    0.5358E-02    0.5928E-02
                        8.000       -0.7423E-03   -0.1057E-02   -0.8380E-03   -0.4963E-03     0.000        0.1457E-02    0.3533E-02    0.5850E-02    0.6455E-02
                        10.00       -0.1304E-02   -0.1448E-02   -0.1033E-02   -0.5941E-03     0.000        0.1652E-02    0.3924E-02    0.6412E-02    0.7056E-02
                        12.00       -0.1984E-02   -0.1921E-02   -0.1270E-02   -0.7124E-03     0.000        0.1889E-02    0.4397E-02    0.7092E-02    0.7784E-02
                        15.00       -0.3304E-02   -0.2840E-02   -0.1729E-02   -0.9421E-03     0.000        0.2348E-02    0.5316E-02    0.8412E-02    0.9197E-02
                        20.00       -0.7766E-02   -0.5947E-02   -0.3283E-02   -0.1719E-02     0.000        0.3902E-02    0.8423E-02    0.1287E-01    0.1397E-01
                        30.00       -0.1698E-01   -0.1236E-01   -0.6490E-02   -0.3323E-02     0.000        0.7109E-02    0.1484E-01    0.2209E-01    0.2384E-01
                        40.00       -0.2265E-01   -0.1631E-01   -0.8465E-02   -0.4310E-02     0.000        0.9084E-02    0.1879E-01    0.2776E-01    0.2991E-01
                        50.00       -0.2802E-01   -0.2004E-01   -0.1033E-01   -0.5243E-02     0.000        0.1095E-01    0.2252E-01    0.3312E-01    0.3565E-01
                        60.00       -0.3370E-01   -0.2400E-01   -0.1231E-01   -0.6232E-02     0.000        0.1293E-01    0.2648E-01    0.3881E-01    0.4173E-01
                        70.00       -0.3933E-01   -0.2792E-01   -0.1427E-01   -0.7213E-02     0.000        0.1489E-01    0.3040E-01    0.4444E-01    0.4777E-01
                        80.00       -0.4497E-01   -0.3185E-01   -0.1623E-01   -0.8194E-02     0.000        0.1685E-01    0.3432E-01    0.5008E-01    0.5380E-01
                        90.00       -0.5061E-01   -0.3577E-01   -0.1820E-01   -0.9175E-02     0.000        0.1882E-01    0.3825E-01    0.5572E-01    0.5984E-01
                  </tableData>
               </table>
            </product>
         </function>
-->

         <function name="aero/coefficient/CdDFlpL">
            <description>
               Drag Coefficient due to Left Single Slotted Flaps Deflection
               Positive surface deflection is trailing edge down
               Ultimately, we will feed this left flap pos
            </description>
            <product>
               <property>aero/qbar-psf</property>
               <property>metrics/Sw-sqft</property>
               <table>
                  <independentVar lookup="row">aero/alpha-deg</independentVar>
                  <independentVar lookup="column">fcs/flap-pos-deg</independentVar>
                  <tableData>
                                      0.000         5.000         10.00         15.00         20.00         25.00         30.00         35.00
                       -5.000         0.000        0.2348E-05    0.2756E-03    0.7849E-03    0.1504E-02    0.2299E-02    0.3073E-02    0.3721E-02
                       -2.500         0.000        0.4896E-03    0.1246E-02    0.2214E-02    0.3375E-02    0.4549E-02    0.5632E-02    0.6510E-02
                       -1.000         0.000        0.7819E-03    0.1829E-02    0.3072E-02    0.4498E-02    0.5898E-02    0.7167E-02    0.8184E-02
                        0.000         0.000        0.9768E-03    0.2217E-02    0.3644E-02    0.5246E-02    0.6798E-02    0.8190E-02    0.9299E-02
                        1.000         0.000        0.1172E-02    0.2605E-02    0.4216E-02    0.5995E-02    0.7697E-02    0.9214E-02    0.1041E-01
                        2.500         0.000        0.1464E-02    0.3187E-02    0.5074E-02    0.7117E-02    0.9047E-02    0.1075E-01    0.1209E-01
                        5.000         0.000        0.1951E-02    0.4158E-02    0.6503E-02    0.8988E-02    0.1130E-01    0.1331E-01    0.1488E-01
                        6.000         0.000        0.2146E-02    0.4546E-02    0.7075E-02    0.9737E-02    0.1220E-01    0.1433E-01    0.1599E-01
                        8.000         0.000        0.2536E-02    0.5323E-02    0.8219E-02    0.1123E-01    0.1399E-01    0.1638E-01    0.1822E-01
                        10.00         0.000        0.2926E-02    0.6099E-02    0.9362E-02    0.1273E-01    0.1579E-01    0.1842E-01    0.2046E-01
                        12.00         0.000        0.3316E-02    0.6875E-02    0.1051E-01    0.1423E-01    0.1759E-01    0.2047E-01    0.2269E-01
                        15.00         0.000        0.3900E-02    0.8040E-02    0.1222E-01    0.1647E-01    0.2029E-01    0.2354E-01    0.2603E-01
                        20.00         0.000        0.4875E-02    0.9981E-02    0.1508E-01    0.2021E-01    0.2479E-01    0.2866E-01    0.3161E-01
                        30.00         0.000        0.6824E-02    0.1386E-01    0.2080E-01    0.2770E-01    0.3379E-01    0.3889E-01    0.4277E-01
                        40.00         0.000        0.8772E-02    0.1775E-01    0.2652E-01    0.3518E-01    0.4278E-01    0.4913E-01    0.5392E-01
                        50.00         0.000        0.1072E-01    0.2163E-01    0.3223E-01    0.4267E-01    0.5178E-01    0.5936E-01    0.6508E-01
                        60.00         0.000        0.1267E-01    0.2551E-01    0.3795E-01    0.5015E-01    0.6078E-01    0.6959E-01    0.7624E-01
                        70.00         0.000        0.1462E-01    0.2939E-01    0.4367E-01    0.5763E-01    0.6977E-01    0.7983E-01    0.8739E-01
                        80.00         0.000        0.1657E-01    0.3327E-01    0.4939E-01    0.6512E-01    0.7877E-01    0.9006E-01    0.9855E-01
                        90.00         0.000        0.1852E-01    0.3716E-01    0.5511E-01    0.7260E-01    0.8776E-01    0.1003        0.1097
                  </tableData>
               </table>
            </product>
         </function>

         <function name="aero/coefficient/CdDFlpR">
            <description>
               Drag Coefficient due to Right Single Slotted Flaps Deflection
               Positive surface deflection is trailing edge down
               Ultimately, we will feed this right flap pos
            </description>
            <product>
               <property>aero/qbar-psf</property>
               <property>metrics/Sw-sqft</property>
               <table>
                  <independentVar lookup="row">aero/alpha-deg</independentVar>
                  <independentVar lookup="column">fcs/flap-pos-deg</independentVar>
                  <tableData>
                                      0.000         5.000         10.00         15.00         20.00         25.00         30.00         35.00
                       -5.000         0.000        0.2348E-05    0.2756E-03    0.7849E-03    0.1504E-02    0.2299E-02    0.3073E-02    0.3721E-02
                       -2.500         0.000        0.4896E-03    0.1246E-02    0.2214E-02    0.3375E-02    0.4549E-02    0.5632E-02    0.6510E-02
                       -1.000         0.000        0.7819E-03    0.1829E-02    0.3072E-02    0.4498E-02    0.5898E-02    0.7167E-02    0.8184E-02
                        0.000         0.000        0.9768E-03    0.2217E-02    0.3644E-02    0.5246E-02    0.6798E-02    0.8190E-02    0.9299E-02
                        1.000         0.000        0.1172E-02    0.2605E-02    0.4216E-02    0.5995E-02    0.7697E-02    0.9214E-02    0.1041E-01
                        2.500         0.000        0.1464E-02    0.3187E-02    0.5074E-02    0.7117E-02    0.9047E-02    0.1075E-01    0.1209E-01
                        5.000         0.000        0.1951E-02    0.4158E-02    0.6503E-02    0.8988E-02    0.1130E-01    0.1331E-01    0.1488E-01
                        6.000         0.000        0.2146E-02    0.4546E-02    0.7075E-02    0.9737E-02    0.1220E-01    0.1433E-01    0.1599E-01
                        8.000         0.000        0.2536E-02    0.5323E-02    0.8219E-02    0.1123E-01    0.1399E-01    0.1638E-01    0.1822E-01
                        10.00         0.000        0.2926E-02    0.6099E-02    0.9362E-02    0.1273E-01    0.1579E-01    0.1842E-01    0.2046E-01
                        12.00         0.000        0.3316E-02    0.6875E-02    0.1051E-01    0.1423E-01    0.1759E-01    0.2047E-01    0.2269E-01
                        15.00         0.000        0.3900E-02    0.8040E-02    0.1222E-01    0.1647E-01    0.2029E-01    0.2354E-01    0.2603E-01
                        20.00         0.000        0.4875E-02    0.9981E-02    0.1508E-01    0.2021E-01    0.2479E-01    0.2866E-01    0.3161E-01
                        30.00         0.000        0.6824E-02    0.1386E-01    0.2080E-01    0.2770E-01    0.3379E-01    0.3889E-01    0.4277E-01
                        40.00         0.000        0.8772E-02    0.1775E-01    0.2652E-01    0.3518E-01    0.4278E-01    0.4913E-01    0.5392E-01
                        50.00         0.000        0.1072E-01    0.2163E-01    0.3223E-01    0.4267E-01    0.5178E-01    0.5936E-01    0.6508E-01
                        60.00         0.000        0.1267E-01    0.2551E-01    0.3795E-01    0.5015E-01    0.6078E-01    0.6959E-01    0.7624E-01
                        70.00         0.000        0.1462E-01    0.2939E-01    0.4367E-01    0.5763E-01    0.6977E-01    0.7983E-01    0.8739E-01
                        80.00         0.000        0.1657E-01    0.3327E-01    0.4939E-01    0.6512E-01    0.7877E-01    0.9006E-01    0.9855E-01
                        90.00         0.000        0.1852E-01    0.3716E-01    0.5511E-01    0.7260E-01    0.8776E-01    0.1003        0.1097
                  </tableData>
               </table>
            </product>
         </function>

         <function name="aero/coefficient/CdDe">
            <description>
               Drag Coefficient due to Elevator Deflection
               Positive surface deflection is trailing edge down
            </description>
            <product>
               <property>aero/qbar-psf</property>
               <property>metrics/Sw-sqft</property>
               <table>
                  <independentVar lookup="row">aero/alpha-deg</independentVar>
                  <independentVar lookup="column">fcs/elevator-pos-deg</independentVar>
                  <tableData>
                                     -15.00        -10.00        -5.000        -2.500         0.000         5.000         10.00         15.00         20.00
                       -5.000        0.4691E-02    0.2186E-02    0.4739E-03    0.8222E-04    0.2925E-06    0.7640E-03    0.2766E-02    0.5525E-02    0.6299E-02
                       -2.500        0.3462E-02    0.1330E-02    0.4588E-04   -0.1318E-03    0.1149E-05    0.1192E-02    0.3622E-02    0.6754E-02    0.7616E-02
                       -1.000        0.2760E-02    0.8413E-03   -0.1983E-03   -0.2539E-03    0.1637E-05    0.1436E-02    0.4110E-02    0.7456E-02    0.8367E-02
                        0.000        0.2297E-02    0.5189E-03   -0.3595E-03   -0.3345E-03    0.1959E-05    0.1597E-02    0.4433E-02    0.7919E-02    0.8862E-02
                        1.000        0.1836E-02    0.1977E-03   -0.5201E-03   -0.4148E-03    0.2280E-05    0.1758E-02    0.4754E-02    0.8380E-02    0.9356E-02
                        2.500        0.1126E-02   -0.2967E-03   -0.7673E-03   -0.5384E-03    0.2775E-05    0.2005E-02    0.5248E-02    0.9090E-02    0.1012E-01
                        5.000       -0.3194E-04   -0.1103E-02   -0.1170E-02   -0.7399E-03    0.3581E-05    0.2408E-02    0.6054E-02    0.1025E-01    0.1136E-01
                        6.000       -0.4996E-03   -0.1428E-02   -0.1333E-02   -0.8212E-03    0.3907E-05    0.2571E-02    0.6380E-02    0.1072E-01    0.1186E-01
                        8.000       -0.1485E-02   -0.2114E-02   -0.1676E-02   -0.9927E-03    0.4592E-05    0.2914E-02    0.7065E-02    0.1170E-01    0.1291E-01
                        10.00       -0.2608E-02   -0.2896E-02   -0.2067E-02   -0.1188E-02    0.5373E-05    0.3305E-02    0.7847E-02    0.1282E-01    0.1411E-01
                        12.00       -0.3967E-02   -0.3842E-02   -0.2540E-02   -0.1425E-02    0.6321E-05    0.3778E-02    0.8794E-02    0.1418E-01    0.1557E-01
                        15.00       -0.6607E-02   -0.5680E-02   -0.3459E-02   -0.1884E-02    0.8158E-05    0.4697E-02    0.1063E-01    0.1682E-01    0.1839E-01
                        20.00       -0.1553E-01   -0.1189E-01   -0.6566E-02   -0.3438E-02    0.1437E-04    0.7804E-02    0.1685E-01    0.2575E-01    0.2795E-01
                        30.00       -0.3396E-01   -0.2472E-01   -0.1298E-01   -0.6645E-02    0.2719E-04    0.1422E-01    0.2967E-01    0.4418E-01    0.4768E-01
                        40.00       -0.4531E-01   -0.3262E-01   -0.1693E-01   -0.8620E-02    0.3511E-04    0.1817E-01    0.3757E-01    0.5552E-01    0.5982E-01
                        50.00       -0.5603E-01   -0.4009E-01   -0.2066E-01   -0.1049E-01    0.4256E-04    0.2190E-01    0.4504E-01    0.6625E-01    0.7130E-01
                        60.00       -0.6740E-01   -0.4800E-01   -0.2462E-01   -0.1246E-01    0.5049E-04    0.2586E-01    0.5295E-01    0.7761E-01    0.8347E-01
                        70.00       -0.7867E-01   -0.5585E-01   -0.2854E-01   -0.1443E-01    0.5826E-04    0.2978E-01    0.6080E-01    0.8889E-01    0.9554E-01
                        80.00       -0.8994E-01   -0.6370E-01   -0.3247E-01   -0.1639E-01    0.6601E-04    0.3371E-01    0.6865E-01    0.1002        0.1076
                        90.00       -0.1012       -0.7155E-01   -0.3639E-01   -0.1835E-01    0.7403E-04    0.3763E-01    0.7650E-01    0.1114        0.1197
                  </tableData>
               </table>
            </product>
         </function>

		 <!-- DATCOM does not give Drag due to sideslib (Beta)
		 so I took the value form the c172p for estimation -->
            <function name="aero/coefficient/CDbeta">
                <description>Drag_due_to_sideslip</description>
                <product>
                    <property>aero/qbar-psf</property>
                    <property>metrics/Sw-sqft</property>
                    <property>aero/mag-beta-rad</property>
                    <value>0.1500</value>
                </product>
            </function>

  </axis>

  <axis name="SIDE">

         <function name="aero/coefficient/Cyb">
            <description>
               Side Force coefficient due to Sideslip(per degree)
                Contributes to damping of Dutch Roll mode
            </description>
            <product>
               <property>aero/qbar-psf</property>
               <property>metrics/Sw-sqft</property>
               <property>aero/beta-deg</property>
               <table>
                  <independentVar lookup="row">aero/alpha-deg</independentVar>
                  <tableData>
                       -5.000       -0.9105E-02
                       -2.500       -0.9105E-02
                       -1.000       -0.9105E-02
                        0.000       -0.9105E-02
                        1.000       -0.9105E-02
                        2.500       -0.9105E-02
                        5.000       -0.9105E-02
                        6.000       -0.9105E-02
                        8.000       -0.9105E-02
                        10.00       -0.9105E-02
                        12.00       -0.9105E-02
                        15.00       -0.9105E-02
                        20.00       -0.9105E-02
                        30.00       -0.9105E-02
                        40.00       -0.9105E-02
                        50.00       -0.9105E-02
                        60.00       -0.9105E-02
                        70.00       -0.9105E-02
                        80.00       -0.9105E-02
                        90.00       -0.9105E-02
                  </tableData>
               </table>
            </product>
         </function>

         <function name="aero/coefficient/Cyp">
            <description>
               Side Force Coefficient due to Roll Rate(per degree)
            </description>
            <product>
               <property>velocities/p-aero-rad_sec</property>
               <value>57.29577951</value>
               <property>aero/qbar-psf</property>
               <property>metrics/Sw-sqft</property>
               <property>aero/bi2vel</property>
               <table>
                  <independentVar lookup="row">aero/alpha-deg</independentVar>
                  <tableData>
                       -5.000       -0.2485E-02
                       -2.500       -0.2460E-02
                       -1.000       -0.2446E-02
                        0.000       -0.2439E-02
                        1.000       -0.2433E-02
                        2.500       -0.2427E-02
                        5.000       -0.2427E-02
                        6.000       -0.2431E-02
                        8.000       -0.2447E-02
                        10.00       -0.2474E-02
                        12.00       -0.2690E-02
                        15.00       -0.2234E-02
                        20.00       -0.1329E-02
                        30.00        0.5564E-03
                        40.00        0.1471E-02
                        50.00        0.1821E-02
                        60.00        0.2042E-02
                        70.00        0.2167E-02
                        80.00        0.2339E-02
                        90.00        0.2600E-02
                  </tableData>
               </table>
            </product>
         </function>

         <!-- *************************
              Not calculated by DATCOM+
              *************************
         -->

         <function name="aero/coefficient/Cyr">
            <description>
               Side Force due to Yaw Rate(DATCOM does not calculate)
               Effect is small
            </description>
            <product>
               <property>velocities/r-aero-rad_sec</property>
               <property>aero/qbar-psf</property>
               <property>metrics/Sw-sqft</property>
               <property>aero/bi2vel</property>
               <value>   0.010    </value> 		<!-- Small value since the effect is anyway small -->
            </product>
         </function>


         <!-- *************************
              Not calculated by DATCOM+
              *************************
         -->

         <function name="aero/coefficient/CyDr">
            <description>
               Side Force due to rudder(DATCOM does not calculate)
            </description>
            <product>
               <property>aero/qbar-psf</property>
               <property>metrics/Sw-sqft</property>
               <!--property>fcs/rudder-pos-deg</property>
               <value>   0.000    </value-->

			   <!-- Lines taken from c172p -->
			   <property>fcs/rudder-pos-rad</property>
               <value>0.150</value>
			   <!-- Lines taken from c172p -->
            </product>
         </function>


         <!-- *************************
              Not calculated by DATCOM+
              *************************
         -->

         <function name="aero/coefficient/CyDa">
            <description>
               Side Force due to aileron(DATCOM does not calculate)
               Usually neglected
            </description>
            <product>
               <property>aero/qbar-psf</property>
               <property>metrics/Sw-sqft</property>
               <property>fcs/left-aileron-pos-deg</property>
               <value>   0.010    </value> <!-- Small value since the effect is usually neglected -->
            </product>
         </function>

  </axis>

  <axis name="ROLL">

         <function name="aero/coefficient/Clb">
            <description>
               Roll Moment coefficient due to Beta(per degree)
               Decrease of Clb to small negative value improves Dutch Roll Damping
               High Positive value leads to excessive spiral instability
            </description>
            <product>
               <property>aero/qbar-psf</property>
               <property>metrics/Sw-sqft</property>
               <property>metrics/bw-ft</property>
               <property>aero/beta-deg</property>
               <table>
                  <independentVar lookup="row">aero/alpha-deg</independentVar>
                  <tableData>
                       -5.000       -0.1091E-02
                       -2.500       -0.1133E-02
                       -1.000       -0.1158E-02
                        0.000       -0.1176E-02
                        1.000       -0.1195E-02
                        2.500       -0.1225E-02
                        5.000       -0.1280E-02
                        6.000       -0.1303E-02
                        8.000       -0.1351E-02
                        10.00       -0.1389E-02
                        12.00       -0.1408E-02
                        15.00       -0.1404E-02
                        20.00       -0.8636E-03
                        30.00        0.4291E-03
                        40.00        0.8790E-03
                        50.00        0.1007E-02
                        60.00        0.1026E-02
                        70.00        0.1022E-02
                        80.00        0.1146E-02
                        90.00         181.0
                  </tableData>
               </table>
            </product>
         </function>

         <function name="aero/coefficient/Clp">
            <description>
               Roll Moment coefficient due to roll rate(per degree)
               Clp alone determines damping-in-roll characteristics
            </description>
            <product>
               <property>aero/qbar-psf</property>
               <property>metrics/Sw-sqft</property>
               <property>metrics/bw-ft</property>
               <property>aero/bi2vel</property>
               <property>velocities/p-aero-rad_sec</property>
               <table>
                  <independentVar lookup="row">aero/alpha-deg</independentVar>
                  <tableData>
                       -5.000       -0.2435E-01
                       -2.500       -0.2489E-01
                       -1.000       -0.2554E-01
                        0.000       -0.2616E-01
                        1.000       -0.2673E-01
                        2.500       -0.2747E-01
                        5.000       -0.2845E-01
                        6.000       -0.2873E-01
                        8.000       -0.2712E-01
                        10.00       -0.2285E-01
                        12.00       -0.1803E-01
                        15.00        0.8754E-02
                        20.00        0.4922E-01
                        30.00        0.3086E-01
                        40.00        0.3261E-03
                        50.00       -0.1177E-01
                        60.00       -0.1606E-01
                        70.00       -0.1372E-01
                        80.00       -0.5603E-02
                        90.00        0.4044E-02
                  </tableData>
               </table>
            </product>
         </function>

         <function name="aero/coefficient/Clr">
            <description>
               Roll Moment coefficient due to yaw rate(per degree)
               Considerable effect on Spiral mode. Large
               positive values leads to strong sprial instability.
            </description>
            <product>
               <property>aero/qbar-psf</property>
               <property>metrics/Sw-sqft</property>
               <property>metrics/bw-ft</property>
               <property>aero/bi2vel</property>
               <property>velocities/r-aero-rad_sec</property>
               <table>
                  <independentVar lookup="row">aero/alpha-deg</independentVar>
                  <tableData>
                       -5.000       -0.1825E-04
                       -2.500        0.6336E-03
                       -1.000        0.1031E-02
                        0.000        0.1305E-02
                        1.000        0.1586E-02
                        2.500        0.2018E-02
                        5.000        0.2761E-02
                        6.000        0.3064E-02
                        8.000        0.3678E-02
                        10.00        0.4203E-02
                        12.00        0.4615E-02
                        15.00        0.5024E-02
                        20.00        0.2083E-02
                        30.00       -0.4315E-02
                        40.00       -0.5662E-02
                        50.00       -0.4934E-02
                        60.00       -0.3382E-02
                        70.00       -0.1548E-02
                        80.00       -0.4337E-03
                        90.00       -0.3917E-03
                  </tableData>
               </table>
            </product>
         </function>

         <function name="aero/coefficient/ClDa">
            <description>
               Roll Moment coefficient due to Left Double Slotted Flaps Deflection
            </description>
            <product>
               <property>aero/qbar-psf</property>
               <property>metrics/Sw-sqft</property>
               <property>metrics/bw-ft</property>
               <table>
                  <independentVar lookup="row">aero/function/ailerons-pos-sum-deg</independentVar>
                  <tableData>
                       -36.00       -0.6076E-01
                       -27.00       -0.5270E-01
                       -18.00       -0.3656E-01
                       -9.000       -0.1836E-01
                        0.000         0.000
                        9.000        0.1836E-01
                        18.00        0.3656E-01
                        27.00        0.5270E-01
                        36.00        0.6076E-01
                  </tableData>
               </table>
            </product>
         </function>

<!--         <function name="aero/coefficient/CldAilerons">
            <description>
               Roll Moment Coefficient due to Asymetrical Plain Flaps Deflection
               calculated as difference between left and right flap lift coef,
               times distance from centerline to MAC of surface.
            </description>
            <product>
               <value>      1.62</value>
               <difference>
                  <property>aero/coefficient/CLdAilR</property>
                  <property>aero/coefficient/CLdAilL</property>
               </difference>
            </product>
         </function>
-->

         <function name="aero/coefficient/CldFlaps">
            <description>
               Roll Moment Coefficient due to Asymetrical Single Slotted Flaps Deflection
               calculated as difference between left and right flap lift coef,
               times distance from centerline to MAC of surface.
            </description>
            <product>
               <value>      4.17</value>
               <difference>
                  <property>aero/coefficient/CLdFlpR</property>
                  <property>aero/coefficient/CLdFlpL</property>
               </difference>
            </product>
         </function>

         <!-- *************************
              Not calculated by DATCOM+
              *************************
         -->

         <function name="aero/coefficient/ClDr">
            <description>
               Roll moment due to rudder(DATCOM does not calculate)
               Usually insignificant in dynamic stability considerations
               but is used in autopilot work
            </description>
            <product>
               <property>metrics/bw-ft</property>
               <property>aero/qbar-psf</property>
               <property>metrics/Sw-sqft</property>
               <!--property>fcs/rudder-pos-deg</property>
               <value>   0.000    </value-->
			   <!-- Lines taken from c172p -->
			   <property>fcs/rudder-pos-rad</property>
               <value>0.0147</value>
			   <!-- Lines taken from c172p -->
            </product>
         </function>

  </axis>

  <axis name="PITCH">

         <function name="aero/coefficient/Cm_basic">
            <description>
               Basic_Pitch_moment_coefficient
            </description>
            <product>
               <property>aero/qbar-psf</property>
               <property>metrics/Sw-sqft</property>
               <property>metrics/cbarw-ft</property>
               <table>
                  <independentVar lookup="row">aero/alpha-deg</independentVar>
                  <tableData>
                       -5.000        0.4750E-01
                       -2.500       -0.1448E-01
                       -1.000       -0.4922E-01
                        0.000       -0.7128E-01
                        1.000       -0.9330E-01
                        2.500       -0.1273
                        5.000       -0.1834
                        6.000       -0.2070
                        8.000       -0.2587
                        10.00       -0.3114
                        12.00       -0.3698
                        15.00         0.000
                        20.00         0.000
                        30.00         0.000
                        40.00         0.000
                        50.00         0.000
                        60.00         0.000
                        70.00         0.000
                        80.00         0.000
                        90.00         0.000
                  </tableData>
               </table>
            </product>
         </function>

         <function name="aero/coefficient/Cmq">
            <description>
               Pitch moment coefficient due to pitch rate(per degree)
                Pitch Damping Derivative
               Very important to Short Period damping of oscillations
            </description>
            <product>
               <property>aero/qbar-psf</property>
               <property>metrics/Sw-sqft</property>
               <property>metrics/cbarw-ft</property>
               <property>aero/ci2vel</property>
               <property>velocities/q-aero-rad_sec</property>
               <table>
                  <independentVar lookup="row">aero/alpha-deg</independentVar>
                  <tableData>
                       -5.000       -0.3501
                       -2.500       -0.3501
                       -1.000       -0.3501
                        0.000       -0.3501
                        1.000       -0.3501
                        2.500       -0.3501
                        5.000       -0.3501
                        6.000       -0.3501
                        8.000       -0.3501
                        10.00       -0.3501
                        12.00       -0.3501
                        15.00       -0.3501
                        20.00       -0.3501
                        30.00       -0.3501
                        40.00       -0.3501
                        50.00       -0.3501
                        60.00       -0.3501
                        70.00       -0.3501
                        80.00       -0.3501
                        90.00       -0.3501
                  </tableData>
               </table>
            </product>
         </function>

         <function name="aero/coefficient/Cmadot">
            <description>
               Pitch moment coefficient due to AOA rate(per degree)
               Negitive Cmad increase Short Period damping
            </description>
            <product>
               <property>aero/qbar-psf</property>
               <property>metrics/Sw-sqft</property>
               <property>metrics/cbarw-ft</property>
               <property>aero/ci2vel</property>
               <property>aero/alphadot-deg_sec</property>
               <table>
                  <independentVar lookup="row">aero/alpha-deg</independentVar>
                  <tableData>
                       -5.000       -0.2036
                       -2.500       -0.2085
                       -1.000       -0.2122
                        0.000       -0.2131
                        1.000       -0.2118
                        2.500       -0.2108
                        5.000       -0.2118
                        6.000       -0.2087
                        8.000       -0.1924
                        10.00       -0.1568
                        12.00       -0.1081
                        15.00        0.2944E-01
                        20.00        0.2169
                        30.00        0.1158
                        40.00       -0.7646E-02
                        50.00       -0.7375E-02
                        60.00        0.1421E-02
                        70.00        0.1421E-02
                        80.00        0.1421E-02
                        90.00        0.1421E-02
                  </tableData>
               </table>
            </product>
         </function>

         <function name="aero/coefficient/CmDe">
            <description>
               Pitch moment coefficient due to elevator deflection
               Positive surface deflection is trailing edge down
            </description>
            <product>
               <property>aero/qbar-psf</property>
               <property>metrics/Sw-sqft</property>
               <property>metrics/cbarw-ft</property>
               <table>
                  <independentVar lookup="row">fcs/elevator-pos-deg</independentVar>
                  <tableData>
                       -15.00        0.3539
                       -10.00        0.2467
                       -5.000        0.1234
                       -2.500        0.6168E-01
                        0.000       -0.2467E-03
                        5.000       -0.1234
                        10.00       -0.2467
                        15.00       -0.3543
                        20.00       -0.3825
                  </tableData>
               </table>
            </product>
         </function>

<!--         <function name="aero/coefficient/CmDAilL">
            <description>
               Pitch moment coefficient due to left Plain Flaps Deflection
               Positive surface deflection is trailing edge down
               Ultimately, we will feed this left flap pos
            </description>
            <product>
               <property>aero/qbar-psf</property>
               <property>metrics/Sw-sqft</property>
               <property>metrics/cbarw-ft</property>
               <table>
                  <independentVar lookup="row">fcs/left-aileron-pos-deg</independentVar>
                  <tableData>
                       -15.00        0.1770
                       -10.00        0.1234
                       -5.000        0.6168E-01
                       -2.500        0.3084E-01
                        0.000         0.000
                        5.000       -0.6168E-01
                        10.00       -0.1234
                        15.00       -0.1771
                        20.00       -0.1913
                  </tableData>
               </table>
            </product>
         </function>
-->

<!--         <function name="aero/coefficient/CmDAilR">
            <description>
               Pitch moment coefficient due to right Plain Flaps Deflection
               Positive surface deflection is trailing edge down
               Ultimately, we will feed this right flap pos
            </description>
            <product>
               <property>aero/qbar-psf</property>
               <property>metrics/Sw-sqft</property>
               <property>metrics/cbarw-ft</property>
               <table>
                  <independentVar lookup="row">fcs/right-aileron-pos-deg</independentVar>
                  <tableData>
                       -15.00        0.1770
                       -10.00        0.1234
                       -5.000        0.6168E-01
                       -2.500        0.3084E-01
                        0.000         0.000
                        5.000       -0.6168E-01
                        10.00       -0.1234
                        15.00       -0.1771
                        20.00       -0.1913
                  </tableData>
               </table>
            </product>
         </function>
-->

         <function name="aero/coefficient/CmDFlpL">
            <description>
               Pitch moment coefficient due to left Single Slotted Flaps Deflection
               Positive surface deflection is trailing edge down
               Ultimately, we will feed this left flap pos
            </description>
            <product>
               <property>aero/qbar-psf</property>
               <property>metrics/Sw-sqft</property>
               <property>metrics/cbarw-ft</property>
               <table>
                  <independentVar lookup="row">fcs/flap-pos-deg</independentVar>
                  <tableData>
                        0.000         0.000
                        5.000       -0.1229E-01
                        10.00       -0.2453E-01
                        15.00       -0.3620E-01
                        20.00       -0.4748E-01
                        25.00       -0.5718E-01
                        30.00       -0.6517E-01
                        35.00       -0.7118E-01
                  </tableData>
               </table>
            </product>
         </function>

         <function name="aero/coefficient/CmDFlpR">
            <description>
               Pitch moment coefficient due to right Single Slotted Flaps Deflection
               Positive surface deflection is trailing edge down
               Ultimately, we will feed this right flap pos
            </description>
            <product>
               <property>aero/qbar-psf</property>
               <property>metrics/Sw-sqft</property>
               <property>metrics/cbarw-ft</property>
               <table>
                  <independentVar lookup="row">fcs/flap-pos-deg</independentVar>
                  <tableData>
                        0.000         0.000
                        5.000       -0.1229E-01
                        10.00       -0.2453E-01
                        15.00       -0.3620E-01
                        20.00       -0.4748E-01
                        25.00       -0.5718E-01
                        30.00       -0.6517E-01
                        35.00       -0.7118E-01
                  </tableData>
               </table>
            </product>
         </function>

  </axis>

  <axis name="YAW">

         <function name="aero/coefficient/Cnb">
            <description>
               Yaw moment coefficient due to sideslip(per degree)
               Determines Dutch Roll and Spiral characteristics
               Prevents side-slip and yawing moments
            </description>
            <product>
               <property>aero/qbar-psf</property>
               <property>metrics/Sw-sqft</property>
               <property>metrics/bw-ft</property>
               <property>aero/beta-deg</property>
               <table>
                  <independentVar lookup="row">aero/alpha-deg</independentVar>
                  <tableData>
                       -5.000        0.1355E-02
                       -2.500        0.1355E-02
                       -1.000        0.1355E-02
                        0.000        0.1355E-02
                        1.000        0.1355E-02
                        2.500        0.1355E-02
                        5.000        0.1355E-02
                        6.000        0.1355E-02
                        8.000        0.1355E-02
                        10.00        0.1355E-02
                        12.00        0.1355E-02
                        15.00        0.1355E-02
                        20.00        0.1355E-02
                        30.00        0.1355E-02
                        40.00        0.1355E-02
                        50.00        0.1355E-02
                        60.00        0.1355E-02
                        70.00        0.1355E-02
                        80.00        0.1355E-02
                        90.00        0.1355E-02
                  </tableData>
               </table>
            </product>
         </function>

         <function name="aero/coefficient/Cnp">
            <description>
               Yaw moment coefficient due to roll rate(per degree)
               Reduces Dutch Roll damping
               positive value desireable
            </description>
            <product>
               <property>aero/qbar-psf</property>
               <property>metrics/Sw-sqft</property>
               <property>metrics/bw-ft</property>
               <property>aero/bi2vel</property>
               <property>velocities/p-aero-rad_sec</property>
               <table>
                  <independentVar lookup="row">aero/alpha-deg</independentVar>
                  <tableData>
                       -5.000        0.2581E-03
                       -2.500        0.9210E-04
                       -1.000        0.1629E-03
                        0.000        0.2541E-03
                        1.000        0.3818E-03
                        2.500        0.6386E-03
                        5.000        0.1257E-02
                        6.000        0.1571E-02
                        8.000        0.2185E-02
                        10.00        0.3383E-02
                        12.00        0.1044E-01
                        15.00       -0.2798E-02
                        20.00       -0.3404E-02
                        30.00        0.1803E-02
                        40.00        0.1118E-02
                        50.00        0.1190E-03
                        60.00       -0.5603E-03
                        70.00       -0.8272E-03
                        80.00       -0.8192E-03
                        90.00       -0.5345E-03
                  </tableData>
               </table>
            </product>
         </function>

         <function name="aero/coefficient/Cnr">
            <description>
               Yaw Moment coefficient due to yaw rate(per degree)
               Main contributor to damping of Dutch Roll
            </description>
            <product>
               <property>aero/qbar-psf</property>
               <property>metrics/Sw-sqft</property>
               <property>metrics/bw-ft</property>
               <property>aero/bi2vel</property>
               <property>velocities/r-aero-rad_sec</property>
               <table>
                  <independentVar lookup="row">aero/alpha-deg</independentVar>
                  <tableData>
                       -5.000       -0.2138E-02
                       -2.500       -0.2177E-02
                       -1.000       -0.2205E-02
                        0.000       -0.2227E-02
                        1.000       -0.2251E-02
                        2.500       -0.2291E-02
                        5.000       -0.2372E-02
                        6.000       -0.2410E-02
                        8.000       -0.2493E-02
                        10.00       -0.2575E-02
                        12.00       -0.2645E-02
                        15.00       -0.2716E-02
                        20.00       -0.2295E-02
                        30.00       -0.2282E-02
                        40.00       -0.2169E-02
                        50.00       -0.1665E-02
                        60.00       -0.1089E-02
                        70.00       -0.6248E-03
                        80.00       -0.3247E-03
                        90.00       -0.1369E-03
                  </tableData>
               </table>
            </product>
         </function>

<!--         <function name="aero/coefficient/CnDAil">
            <description>
               Yaw Moment Coefficient due to Asymetrical Plain Flaps Deflection
               calculated as difference between left and right flap drag coef,
               times distance from centerline to MAC of surface.
            </description>
            <product>
               <value>      1.62</value>
               <difference>
                  <property>aero/coefficient/CdDAilR</property>
                  <property>aero/coefficient/CdDAilL</property>
               </difference>
            </product>
         </function>
-->

<!--         <function name="aero/coefficient/CnDFlp">
            <description>
               Yaw Moment Coefficient due to Asymetrical Single Slotted Flaps Deflection
               calculated as difference between left and right flap drag coef,
               times distance from centerline to MAC of surface.
            </description>
            <product>
               <value>      4.17</value>
               <difference>
                  <property>aero/coefficient/CdDFlpR</property>
                  <property>aero/coefficient/CdDFlpL</property>
               </difference>
            </product>
         </function>
-->

         <function name="aero/coefficient/CnDa">
            <description>
               Yaw Moment coefficient due to plain flap aileron deflection
            </description>
            <product>
               <property>aero/qbar-psf</property>
               <property>metrics/Sw-sqft</property>
               <property>metrics/bw-ft</property>
               <table>
                  <independentVar lookup="row">aero/alpha-deg</independentVar>
				  <independentVar lookup="column">aero/function/ailerons-pos-sum-deg</independentVar>
                  <tableData>
                                     -36.00        -27.00        -18.00        -9.000         0.000         9.000         18.00         27.00         36.00
                       -5.000       -0.1111E-02   -0.9635E-03   -0.6685E-03   -0.3356E-03     0.000        0.3356E-03    0.6685E-03    0.9635E-03    0.1111E-02
                       -2.500        0.3519E-03    0.3052E-03    0.2118E-03    0.1063E-03     0.000       -0.1063E-03   -0.2118E-03   -0.3052E-03   -0.3519E-03
                       -1.000        0.1247E-02    0.1081E-02    0.7502E-03    0.3766E-03     0.000       -0.3766E-03   -0.7502E-03   -0.1081E-02   -0.1247E-02
                        0.000        0.1863E-02    0.1616E-02    0.1121E-02    0.5628E-03     0.000       -0.5628E-03   -0.1121E-02   -0.1616E-02   -0.1863E-02
                        1.000        0.2493E-02    0.2163E-02    0.1501E-02    0.7533E-03     0.000       -0.7533E-03   -0.1501E-02   -0.2163E-02   -0.2493E-02
                        2.500        0.3463E-02    0.3004E-02    0.2084E-02    0.1046E-02     0.000       -0.1046E-02   -0.2084E-02   -0.3004E-02   -0.3463E-02
                        5.000        0.5132E-02    0.4452E-02    0.3089E-02    0.1551E-02     0.000       -0.1551E-02   -0.3089E-02   -0.4452E-02   -0.5132E-02
                        6.000        0.5814E-02    0.5043E-02    0.3499E-02    0.1756E-02     0.000       -0.1756E-02   -0.3499E-02   -0.5043E-02   -0.5814E-02
                        8.000        0.7192E-02    0.6239E-02    0.4329E-02    0.2173E-02     0.000       -0.2173E-02   -0.4329E-02   -0.6239E-02   -0.7192E-02
                        10.00        0.8391E-02    0.7279E-02    0.5050E-02    0.2535E-02     0.000       -0.2535E-02   -0.5050E-02   -0.7279E-02   -0.8391E-02
                        12.00        0.9357E-02    0.8117E-02    0.5632E-02    0.2827E-02     0.000       -0.2827E-02   -0.5632E-02   -0.8117E-02   -0.9357E-02
                        15.00        0.1038E-01    0.9002E-02    0.6246E-02    0.3136E-02     0.000       -0.3136E-02   -0.6246E-02   -0.9002E-02   -0.1038E-01
                        20.00        0.4623E-02    0.4010E-02    0.2783E-02    0.1397E-02     0.000       -0.1397E-02   -0.2783E-02   -0.4010E-02   -0.4623E-02
                        30.00       -0.7989E-02   -0.6929E-02   -0.4808E-02   -0.2414E-02     0.000        0.2414E-02    0.4808E-02    0.6929E-02    0.7989E-02
                        40.00       -0.1032E-01   -0.8948E-02   -0.6208E-02   -0.3117E-02     0.000        0.3117E-02    0.6208E-02    0.8948E-02    0.1032E-01
                        50.00       -0.8534E-02   -0.7402E-02   -0.5136E-02   -0.2578E-02     0.000        0.2578E-02    0.5136E-02    0.7402E-02    0.8534E-02
                        60.00       -0.5254E-02   -0.4557E-02   -0.3162E-02   -0.1587E-02     0.000        0.1587E-02    0.3162E-02    0.4557E-02    0.5254E-02
                        70.00       -0.1599E-02   -0.1387E-02   -0.9623E-03   -0.4831E-03     0.000        0.4831E-03    0.9623E-03    0.1387E-02    0.1599E-02
                        80.00        0.3808E-03    0.3303E-03    0.2292E-03    0.1150E-03     0.000       -0.1150E-03   -0.2292E-03   -0.3303E-03   -0.3808E-03
                        90.00        0.1678E-08    0.1456E-08    0.1010E-08    0.5071E-09     0.000       -0.5071E-09   -0.1010E-08   -0.1456E-08   -0.1678E-08
                  </tableData>
               </table>
            </product>
         </function>

         <!-- ******************************************************
              CnDr is not calculated by DATCOM+, but a default value
              is supplied
              ******************************************************-->
         <function name="aero/coefficient/CnDr">
            <description>
               Yaw Coefficient due to rudder(DATCOM does not calculate)
               High value for controllablity, low value
               for good dynamic stability
            </description>
            <product>
               <property>aero/qbar-psf</property>
               <property>metrics/Sw-sqft</property>
               <property>metrics/bw-ft</property>
               <property>fcs/rudder-pos-deg</property>
               <value> -0.1047E-02</value>
            </product>
         </function>

  </axis>

 </aerodynamics>
