<?xml version="1.0"?>

<!-- ProMecc Freccia JSBsim -->
<!-- Copyright (c) 2021 Salvatore De Astis (sdeastis) -->

 <flight_control name="FCS: ProMecc-Freccia">

  <channel name="Pitch">

   <kinematic name="fcs/elevator-cmd-norm-filtered">
	<input>fcs/elevator-cmd-norm</input>
	 <traverse>
	  <setting>
       <position>-1</position>
	   <time>0</time>
	  </setting>
	  <setting>
       <position>1</position>
       <time>0.15</time>
	  </setting>
	 </traverse>
	<output>/sim/model/ProMecc-Freccia/cockpit/yoke-elevator</output>
   </kinematic>

   <summer name="Pitch Trim Sum">
      <input>fcs/elevator-cmd-norm-filtered</input>
      <input>fcs/pitch-trim-cmd-norm</input>
      <clipto>
        <min> -1 </min>
        <max>  1 </max>
      </clipto>
   </summer>

   <aerosurface_scale name="Elevator Control">
      <input>fcs/pitch-trim-sum</input>
	  <gain>0.01745</gain>
      <range>
        <min> -15 </min>    <!-- -15° -->
        <max>  20 </max>    <!--  20° -->
      </range>
      <output>fcs/elevator-pos-rad</output>
   </aerosurface_scale>

   <aerosurface_scale name="elevator normalization">
      <input>fcs/elevator-pos-deg</input>
      <domain>
        <min> -15 </min>
        <max>  20 </max>
      </domain>
      <range>
        <min> -1 </min>
        <max>  1 </max>
      </range>
      <output>fcs/elevator-pos-norm</output>
   </aerosurface_scale>

  </channel>

  <channel name="Roll">

   <kinematic name="fcs/aileron-cmd-norm-filtered">
	<input>fcs/aileron-cmd-norm</input>
	 <traverse>
	  <setting>
       <position>-1</position>
	   <time>0</time>
	  </setting>
	  <setting>
       <position>1</position>
       <time>0.15</time>
	  </setting>
	 </traverse>
	<output>/sim/model/ProMecc-Freccia/cockpit/yoke-aileron</output>
   </kinematic>

   <summer name="Roll Trim Sum">
      <input>fcs/aileron-cmd-norm-filtered</input>
      <input>fcs/roll-trim-cmd-norm</input>
      <clipto>
        <min>-1</min>
        <max>1</max>
      </clipto>
   </summer>

   <summer name="Roll Ailerons Sum">
      <input>fcs/aileron-cmd-norm-filtered</input>
      <input>fcs/roll-trim-cmd-norm</input>
      <clipto>
        <min>-1</min>
        <max>1</max>
      </clipto>
   </summer>

   <aerosurface_scale name="Left Aileron Control">
      <input>fcs/roll-trim-sum</input>
	  <gain>0.01745</gain>
      <range>
        <min>-12</min>   <!-- -12° -->
        <max>24</max>   <!--  24° -->
      </range>
      <output>fcs/left-aileron-pos-rad</output>
   </aerosurface_scale>

   <aerosurface_scale name="Left Aileron Position Normalized">
      <input>fcs/left-aileron-pos-deg</input>
      <domain>
        <min>-12</min>
        <max>24</max>
      </domain>
      <range>
        <min>-1</min>
        <max>1</max>
      </range>
      <output>fcs/left-aileron-pos-norm</output>
   </aerosurface_scale>

   <aerosurface_scale name="Right Aileron Control">
      <input>-fcs/roll-trim-sum</input>
	  <gain>0.01745</gain>
      <range>
        <min>-12</min>
        <max>24</max>
      </range>
      <output>fcs/right-aileron-pos-rad</output>
   </aerosurface_scale>

   <aerosurface_scale name="Right Aileron Position Normalized">
      <input>fcs/right-aileron-pos-deg</input>
      <domain>
        <min>-12</min>
        <max>24</max>
      </domain>
      <range>
        <min>-1</min>
        <max>1</max>
      </range>
      <output>fcs/right-aileron-pos-norm</output>
   </aerosurface_scale>

  </channel>

  <channel name="Yaw">

  <kinematic name="fcs/rudder-cmd-norm-filtered">
	<input>fcs/rudder-cmd-norm</input>
	 <traverse>
	  <setting>
       <position>-1</position>
	   <time>0</time>
	  </setting>
	  <setting>
       <position>1</position>
       <time>0.15</time>
	  </setting>
	 </traverse>
	<output>/sim/model/ProMecc-Freccia/cockpit/pedals-rudder</output>
   </kinematic>

   <summer name="Yaw Trim Sum">
      <input>fcs/rudder-cmd-norm-filtered</input>
      <input>fcs/yaw-trim-cmd-norm</input>
      <!--input>fcs/yaw-trim-cockpit</input-->
      <clipto>
        <min>-1</min>
        <max>1</max>
      </clipto>
   </summer>

   <aerosurface_scale name="Rudder Control">
      <input>fcs/yaw-trim-sum</input>
	  <gain>0.01745</gain>
      <range>
        <min>-25</min>
        <max>25</max>
      </range>
      <output>fcs/rudder-pos-rad</output>
   </aerosurface_scale>

   <aerosurface_scale name="Rudder Position Normalized">
      <input>fcs/rudder-pos-deg</input>
      <domain>
        <min>-25</min>
        <max>25</max>
      </domain>
      <range>
        <min> -1 </min>
        <max>  1 </max>
      </range>
      <output>fcs/rudder-pos-norm</output>
   </aerosurface_scale>

  </channel>

  <channel name="Flaps">
   <kinematic name="Flaps Control">
     <input>fcs/flap-cmd-norm</input>
     <traverse>
       <setting>
          <position>  0 </position>
          <time>      0 </time>
       </setting>
       <setting>
          <position> 15 </position>
          <time>      4 </time>
       </setting>
       <setting>
          <position> 35 </position>
          <time>      4 </time>
       </setting>
     </traverse>
     <output>fcs/flap-pos-deg</output>
   </kinematic>

   <aerosurface_scale name="flap normalization">
      <input>fcs/flap-pos-deg</input>
      <domain>
        <min>  0 </min>
        <max> 35 </max>
      </domain>
      <range>
        <min> 0 </min>
        <max> 1 </max>
      </range>
      <output>fcs/flap-pos-norm</output>
   </aerosurface_scale>

  </channel>

        <channel name="Braking">
            <summer name="fcs/parking-brake-sum">
                <!--input>/sim/model/ProMeccFreccia/securing/chock-visible</input-->
                <!--input>/fdm/jsbsim/damage/repairing</input-->
                <input>/controls/gear/brake-parking</input>
            </summer>

            <fcs_function name="fcs/left-brake-sum">
                <function>
                    <max>
                        <property>fcs/parking-brake-sum</property>
                        <property>/controls/gear/brake-left</property>
						<property>/controls/gear/brake-right</property>
                    </max>
                </function>
                <output>fcs/left-brake-cmd-norm</output>
            </fcs_function>

            <fcs_function name="fcs/right-brake-sum">
                <function>
                    <max>
                        <property>fcs/parking-brake-sum</property>
                        <property>/controls/gear/brake-right</property>
						<property>/controls/gear/brake-left</property>
                    </max>
                </function>
                <output>fcs/right-brake-cmd-norm</output>
            </fcs_function>
        </channel>


  <channel name="Landing Gear">
  </channel>


 </flight_control>
