OpenVSP model (file version 5), 3 components.
Geometry view with OpenVSP parameter names; values to 6 digits, angles in degrees, lengths in the model's unit.
Overall bounding box: X_Min=0 X_Len=7.004 Y_Min=-4.381 Y_Len=8.762 Z_Min=-1.5 Z_Len=3

Wing "main"
  location (X Y Z) 1.766 0 -0.25, rotation 0 0 0
  symmetric about XZ
  bounding box size 1.47674 8.762 0.469308
  totals: TotalSpan=8.79318 TotalProjectedSpan=8.762 TotalChord=0.94166 TotalArea=10.1531 TotalAR=7.56153
  root: chord 1.47664, twist 0.7, NACA 63-series A=1 IdealCl=0.4 ThickChord=0.12
  sections:
    n  Span      Root_Chord  Tip_Chord  Area      Sweep    Sweep_Location  Dihedral  Twist  Twist_Location  tip airfoil
    1  4.09652   1.47664     0.9        4.86799   1        0.25            5         0      0.25            NACA 63-series A=1 IdealCl=0.420601 Invert=1 ThickChord=0.118026
    2  0.300064  0.9         0.489998   0.208544  51.8182  0               0         0      0.25            NACA 63-series A=1 IdealCl=0.4 ThickChord=0.12
  SS_Control "SS_CONT_0": UStart=0.396552 UEnd=0.5 Length_C_Start=0.206897 Length_C_End=0.206897 Length_Start=0.23557 Length_End=0.186207 LE_Flag=0 Surf_Type=2
  SS_Control "SS_CONT_1": UStart=0.287356 UEnd=0.396552 Length_C_Start=0.2 Length_C_End=0.2 Length_Start=0.278094 Length_End=0.227718 LE_Flag=0 Surf_Type=2

Wing "Hstab"
  location (X Y Z) 5.77 0 0.1, rotation 0 -2 0
  symmetric about XZ
  bounding box size 0.899462 2.972 0.0929467
  totals: TotalSpan=2.972 TotalProjectedSpan=2.972 TotalChord=0.75 TotalArea=2.229 TotalAR=3.96267
  root: chord 0.9, twist 0, NACA 4-series Camber=0 CamberLoc=0.2 ThickChord=0.1
  sections:
    n  Span   Root_Chord  Tip_Chord  Area    Sweep     Sweep_Location  Dihedral  Twist  Twist_Location  tip airfoil
    1  1.486  0.9         0.6        1.1145  0.729614  0.5             0         0      0.25            NACA 4-series Camber=0 CamberLoc=0.2 ThickChord=0.09
  SS_Control "SS_CONT_0": UStart=0.33908 UEnd=0.666667 Length_C_Start=0.35 Length_C_End=0.35 Length_Start=0.31319 Length_End=0.21 LE_Flag=0 Surf_Type=2

Fuselage "FuselageGeom"
  location (X Y Z) 0 0 0, rotation 0 0 0
  bounding box size 7.004 2.5 3
  Design: Length=7.004
  cross sections:
    n  XLocPercent  YLocPercent  ZLocPercent  shape
    0  0            0            0            point
    1  0.25         0            0            ellipse Ellipse_Height=3 Ellipse_Width=2.5
    2  0.5          0            0            as above
    3  0.75         0            0            as above
    4  1            0            0            point

VSPAERO settings: Sref=10.1531 bref=8.79318 cref=0.94166 Xcg=1.985 Ycg=0 Zcg=0 AlphaStart=0 AlphaEnd=0 AlphaNpts=1 BetaStart=0 BetaEnd=0 BetaNpts=1 MachStart=0.2 MachEnd=0 MachNpts=1 ReCref=1e+07 Vinf=50 Rho=0.002377
